// SBML level 2 version 1
// Created by MetaFluxNet on 2011-2-14 13:2

model Ppu_MBEL1071 - 160488()
  // Pseudomonas_putida_KT2440
  // For upload to BTJ journal.

  // Compartments:
  compartment cell;

  // Species:
  species T4HP in cell = 1/cell;
  species C180ACP in cell = 1/cell;
  species a_5H24DP in cell = 1/cell;
  species S2MBDH in cell = 1/cell;
  species PBG in cell = 1/cell;
  species HPPP in cell = 1/cell;
  species TCYS in cell = 1/cell;
  species VB12COZ in cell = 1/cell;
  species SLCYSTH in cell = 1/cell;
  species DMK in cell = 1/cell;
  species MLAC in cell = 1/cell;
  species CMP in cell = 1/cell;
  species DCDP in cell = 1/cell;
  species RGT in cell = 1/cell;
  species $VALxt in cell = 1/cell;
  species HPPA in cell = 1/cell;
  species SEROTONIN in cell = 1/cell;
  species SHOHACOA in cell = 1/cell;
  species IDZ4AC in cell = 1/cell;
  species P1AL in cell = 1/cell;
  species a_5HTRY in cell = 1/cell;
  species GL3PETHAM in cell = 1/cell;
  species GLUGSAL in cell = 1/cell;
  species a_5MTA in cell = 1/cell;
  species BT5AMP in cell = 1/cell;
  species RSALAGLY in cell = 1/cell;
  species HBACOA in cell = 1/cell;
  species ORN in cell = 1/cell;
  species FUM in cell = 1/cell;
  species AVAL in cell = 1/cell;
  species $TRExt in cell = 1/cell;
  species NICATOL in cell = 1/cell;
  species CBSARC in cell = 1/cell;
  species NPMHIS in cell = 1/cell;
  species NAGA1P in cell = 1/cell;
  species a_4HPHEACG in cell = 1/cell;
  species TMANBT in cell = 1/cell;
  species GCYS in cell = 1/cell;
  species D8RL in cell = 1/cell;
  species SLIM in cell = 1/cell;
  species PC2 in cell = 1/cell;
  species PC5 in cell = 1/cell;
  species PC4 in cell = 1/cell;
  species X5P in cell = 1/cell;
  species a_23DHPIMCOA in cell = 1/cell;
  species SHCL in cell = 1/cell;
  species HPIMCOA in cell = 1/cell;
  species PHHX in cell = 1/cell;
  species AMADIP in cell = 1/cell;
  species RHDDHACOA in cell = 1/cell;
  species $PHExt in cell = 1/cell;
  species DHF in cell = 1/cell;
  species RTFLA in cell = 1/cell;
  species a_4PPNCYS in cell = 1/cell;
  species IGP in cell = 1/cell;
  species HYXN in cell = 1/cell;
  species FRU in cell = 1/cell;
  species PTRC in cell = 1/cell;
  species UMP in cell = 1/cell;
  species ARIB in cell = 1/cell;
  species SUCGLU in cell = 1/cell;
  species a_26DHCHCBCOA in cell = 1/cell;
  species HNAPTHO in cell = 1/cell;
  species SME3P in cell = 1/cell;
  species NAPTHDOL in cell = 1/cell;
  species AICAR in cell = 1/cell;
  species CHCATOL in cell = 1/cell;
  species $SUCCxt in cell = 1/cell;
  species FLEOL in cell = 1/cell;
  species GALL in cell = 1/cell;
  species CAP in cell = 1/cell;
  species DOROA in cell = 1/cell;
  species CAV in cell = 1/cell;
  species G4D6DMAN in cell = 1/cell;
  species a_4HAC in cell = 1/cell;
  species PRLCOA in cell = 1/cell;
  species $NO2xt in cell = 1/cell;
  species a_4PHEACT in cell = 1/cell;
  species HNAC in cell = 1/cell;
  species TYR in cell = 1/cell;
  species CMPKDO in cell = 1/cell;
  species PHPYR in cell = 1/cell;
  species FMMGLU in cell = 1/cell;
  species HPYR in cell = 1/cell;
  species UDCP in cell = 1/cell;
  species G1P in cell = 1/cell;
  species PGP in cell = 1/cell;
  species CDP in cell = 1/cell;
  species PICVN in cell = 1/cell;
  species CONAL in cell = 1/cell;
  species TRP in cell = 1/cell;
  species PPYR in cell = 1/cell;
  species a_4C2HMUC in cell = 1/cell;
  species IDP in cell = 1/cell;
  species PI in cell = 1/cell;
  species PL in cell = 1/cell;
  species SAICAR in cell = 1/cell;
  species a_3PSME in cell = 1/cell;
  species PA in cell = 1/cell;
  species DAMP in cell = 1/cell;
  species PG in cell = 1/cell;
  species SSCYS in cell = 1/cell;
  species PE in cell = 1/cell;
  species SHBCOA in cell = 1/cell;
  species SALC in cell = 1/cell;
  species PDLA5P in cell = 1/cell;
  species HOOCOA in cell = 1/cell;
  species HIBUT in cell = 1/cell;
  species a_3PSER in cell = 1/cell;
  species PS in cell = 1/cell;
  species PICVOL in cell = 1/cell;
  species O4MP in cell = 1/cell;
  species PAP in cell = 1/cell;
  species a_3IPM in cell = 1/cell;
  species GLUP in cell = 1/cell;
  species UPPMN_GN_LADGMDDADA in cell = 1/cell;
  species LIPIV in cell = 1/cell;
  species MALEM in cell = 1/cell;
  species $PYRxt in cell = 1/cell;
  species OBUT in cell = 1/cell;
  species DUMP in cell = 1/cell;
  species GCOA in cell = 1/cell;
  species $CONOLxt in cell = 1/cell;
  species HOMOGENxt in cell = 1/cell;
  species OGT in cell = 1/cell;
  species cGMP in cell = 1/cell;
  species OIVAL in cell = 1/cell;
  species FOL in cell = 1/cell;
  species APCARX in cell = 1/cell;
  species C161ACP in cell = 1/cell;
  species OANTIGEN in cell = 1/cell;
  species RX in cell = 1/cell;
  species NAM6P in cell = 1/cell;
  species COUMT in cell = 1/cell;
  species DHSK in cell = 1/cell;
  species THPG in cell = 1/cell;
  species FLE in cell = 1/cell;
  species $DGxt in cell = 1/cell;
  species HHXECOA in cell = 1/cell;
  species a_12DH12DH8CNAPTH in cell = 1/cell;
  species AE12BZ in cell = 1/cell;
  species H2AEP in cell = 1/cell;
  species $GL3Pxt in cell = 1/cell;
  species NAPTHOMSUCCOA in cell = 1/cell;
  species AAGCB in cell = 1/cell;
  species DTB in cell = 1/cell;
  species DTTP in cell = 1/cell;
  species PC3B in cell = 1/cell;
  species $GLNxt in cell = 1/cell;
  species bALA in cell = 1/cell;
  species $QTxt in cell = 1/cell;
  species rGLUAPP in cell = 1/cell;
  species TAUxt in cell = 1/cell;
  species DHPT in cell = 1/cell;
  species $bDGLCxt in cell = 1/cell;
  species $BZxt in cell = 1/cell;
  species $SUCxt in cell = 1/cell;
  species FMM in cell = 1/cell;
  species a_5HIDACTAL in cell = 1/cell;
  species bDGLC in cell = 1/cell;
  species SUCGLU5S in cell = 1/cell;
  species $CATOLxt in cell = 1/cell;
  species CPAD5P in cell = 1/cell;
  species INDOLE in cell = 1/cell;
  species SDAPIM in cell = 1/cell;
  species SHEME in cell = 1/cell;
  species AACL in cell = 1/cell;
  species ETYO in cell = 1/cell;
  species THZP in cell = 1/cell;
  species H2O2 in cell = 1/cell;
  species a_2H3MBNPYR in cell = 1/cell;
  species DATP in cell = 1/cell;
  species a_2PPG in cell = 1/cell;
  species $ARGxt in cell = 1/cell;
  species MCOBL in cell = 1/cell;
  species PEP in cell = 1/cell;
  species QA in cell = 1/cell;
  species TH4P in cell = 1/cell;
  species HTDOCOA in cell = 1/cell;
  species DNA in cell = 1/cell;
  species $THIAMINxt in cell = 1/cell;
  species AHTD in cell = 1/cell;
  species VNL in cell = 1/cell;
  species T3 in cell = 1/cell;
  species PNCOA in cell = 1/cell;
  species QT in cell = 1/cell;
  species $GLYxt in cell = 1/cell;
  species VN in cell = 1/cell;
  species ALAALA in cell = 1/cell;
  species C060xt in cell = 1/cell;
  species VK in cell = 1/cell;
  species AA in cell = 1/cell;
  species MALCOA in cell = 1/cell;
  species $DLYSxt in cell = 1/cell;
  species a_8MTXN in cell = 1/cell;
  species $PHAxt in cell = 1/cell;
  species AHMP in cell = 1/cell;
  species UDPNAMAG in cell = 1/cell;
  species ATHSER in cell = 1/cell;
  species $ILExt in cell = 1/cell;
  species METHYLMALONATE in cell = 1/cell;
  species GDP4D6DM in cell = 1/cell;
  species URI in cell = 1/cell;
  species Hxt in cell = 1/cell;
  species a_4C4H2OADIP in cell = 1/cell;
  species OAP in cell = 1/cell;
  species $THRxt in cell = 1/cell;
  species UREA in cell = 1/cell;
  species A5P in cell = 1/cell;
  species $CMARxt in cell = 1/cell;
  species GABA in cell = 1/cell;
  species MUCA in cell = 1/cell;
  species PROPYNOATE in cell = 1/cell;
  species PTNPHQ in cell = 1/cell;
  species HMNAPTH2 in cell = 1/cell;
  species MULAC in cell = 1/cell;
  species a_2OPPP in cell = 1/cell;
  species BET in cell = 1/cell;
  species ILE in cell = 1/cell;
  species NAGLU in cell = 1/cell;
  species SHBHACOA in cell = 1/cell;
  species S7P in cell = 1/cell;
  species NADP in cell = 1/cell;
  species DQT in cell = 1/cell;
  species RVK in cell = 1/cell;
  species GDPMAN in cell = 1/cell;
  species PHEACAL in cell = 1/cell;
  species DTDPRMN in cell = 1/cell;
  species HMGT in cell = 1/cell;
  species HPMHMBZQ in cell = 1/cell;
  species a_2M5IPH25COAc in cell = 1/cell;
  species IDZP in cell = 1/cell;
  species NADG in cell = 1/cell;
  species NADH in cell = 1/cell;
  species NADPH in cell = 1/cell;
  species a_5AAPT in cell = 1/cell;
  species S6P in cell = 1/cell;
  species $FRUxt in cell = 1/cell;
  species R1P in cell = 1/cell;
  species HYGACDM in cell = 1/cell;
  species PRO in cell = 1/cell;
  species ADGCOMN in cell = 1/cell;
  species a_2M5IPH25COAt in cell = 1/cell;
  species INS in cell = 1/cell;
  species pppGpp in cell = 1/cell;
  species NACD in cell = 1/cell;
  species ASPSA in cell = 1/cell;
  species NACN in cell = 1/cell;
  species C120ACP in cell = 1/cell;
  species $LACxt in cell = 1/cell;
  species DUDP in cell = 1/cell;
  species a_2MPECOA in cell = 1/cell;
  species QH2 in cell = 1/cell;
  species PHBUT in cell = 1/cell;
  species CYSI in cell = 1/cell;
  species ETHAM in cell = 1/cell;
  species a_3IPB3ECOA in cell = 1/cell;
  species IMP in cell = 1/cell;
  species G15L in cell = 1/cell;
  species FER in cell = 1/cell;
  species a_25DOP in cell = 1/cell;
  species $METxt in cell = 1/cell;
  species a_2H4HMBNPYR in cell = 1/cell;
  species VB12 in cell = 1/cell;
  species bGLAC in cell = 1/cell;
  species OH in cell = 1/cell;
  species NAPTHHMSUCCOA in cell = 1/cell;
  species DHPHEG in cell = 1/cell;
  species OMP in cell = 1/cell;
  species a_4CMUCNLAC in cell = 1/cell;
  species OPIMCOA in cell = 1/cell;
  species C080 in cell = 1/cell;
  species $INSxt in cell = 1/cell;
  species SLNPP in cell = 1/cell;
  species NAAD in cell = 1/cell;
  species ADPG in cell = 1/cell;
  species ICIT in cell = 1/cell;
  species PPPI in cell = 1/cell;
  species PPEPTIDO in cell = 1/cell;
  species H2OLM in cell = 1/cell;
  species GGPP in cell = 1/cell;
  species FOCYTC in cell = 1/cell;
  species THFPG in cell = 1/cell;
  species ADCOBACD in cell = 1/cell;
  species RHBCOA in cell = 1/cell;
  species MHDTN in cell = 1/cell;
  species $CYSxt in cell = 1/cell;
  species GLAC in cell = 1/cell;
  species PPPP in cell = 1/cell;
  species MDAC in cell = 1/cell;
  species GLAL in cell = 1/cell;
  species DHBP in cell = 1/cell;
  species AMBL in cell = 1/cell;
  species HISOL in cell = 1/cell;
  species Na in cell = 1/cell;
  species $DGLYCERATExt in cell = 1/cell;
  species OHB in cell = 1/cell;
  species DHBZ in cell = 1/cell;
  species UACMAMU in cell = 1/cell;
  species PYRDX in cell = 1/cell;
  species a_3H2MBCOA in cell = 1/cell;
  species $DTxt in cell = 1/cell;
  species $KDGxt in cell = 1/cell;
  species CDPMDE in cell = 1/cell;
  species O2 in cell = 1/cell;
  species LAMACID in cell = 1/cell;
  species MDE4P in cell = 1/cell;
  species HDDACOA in cell = 1/cell;
  species UDPGALFUR in cell = 1/cell;
  species DGR in cell = 1/cell;
  species ACALA in cell = 1/cell;
  species PURI5P in cell = 1/cell;
  species $GLUxt in cell = 1/cell;
  species MTHSNL in cell = 1/cell;
  species $FUMxt in cell = 1/cell;
  species DHGL in cell = 1/cell;
  species $TRPxt in cell = 1/cell;
  species DHP in cell = 1/cell;
  species DHDP in cell = 1/cell;
  species HOPT in cell = 1/cell;
  species ADIP in cell = 1/cell;
  species HOECOA in cell = 1/cell;
  species a_5MCYT in cell = 1/cell;
  species APS in cell = 1/cell;
  species CYTS in cell = 1/cell;
  species CL in cell = 1/cell;
  species Mgxt in cell = 1/cell;
  species UDPG23A in cell = 1/cell;
  species SB1P in cell = 1/cell;
  species $C080xt in cell = 1/cell;
  species AHMPP in cell = 1/cell;
  species PPI in cell = 1/cell;
  species SHTDHACOA in cell = 1/cell;
  species PC8X in cell = 1/cell;
  species FAD in cell = 1/cell;
  species a_2H4IPCHCCOA in cell = 1/cell;
  species ACLE in cell = 1/cell;
  species ADNSEL in cell = 1/cell;
  species MCATOL4 in cell = 1/cell;
  species DCAMP in cell = 1/cell;
  species GLUPEP in cell = 1/cell;
  species IMZACAL in cell = 1/cell;
  species S17BP in cell = 1/cell;
  species CYNHR in cell = 1/cell;
  species PQQ in cell = 1/cell;
  species AppppA in cell = 1/cell;
  species N4ACAB in cell = 1/cell;
  species NAMD in cell = 1/cell;
  species DIN in cell = 1/cell;
  species HBOCOA in cell = 1/cell;
  species PYTHP in cell = 1/cell;
  species PDLA in cell = 1/cell;
  species NAPTHMESUCCOA in cell = 1/cell;
  species AGCR in cell = 1/cell;
  species C040 in cell = 1/cell;
  species CDPDG in cell = 1/cell;
  species ADPHEP in cell = 1/cell;
  species MG in cell = 1/cell;
  species PPIP in cell = 1/cell;
  species HPCOA in cell = 1/cell;
  species UNAGAMU in cell = 1/cell;
  species PPIX in cell = 1/cell;
  species SFPYR in cell = 1/cell;
  species MI in cell = 1/cell;
  species MANN1 in cell = 1/cell;
  species PPHG in cell = 1/cell;
  species BZ in cell = 1/cell;
  species FALD in cell = 1/cell;
  species UDPG in cell = 1/cell;
  species C141ACP in cell = 1/cell;
  species DALA in cell = 1/cell;
  species LACTOSE in cell = 1/cell;
  species BT in cell = 1/cell;
  species Mg in cell = 1/cell;
  species PHDD in cell = 1/cell;
  species a_4MOP in cell = 1/cell;
  species SHDDHACOA in cell = 1/cell;
  species DLYS in cell = 1/cell;
  species PPHSER in cell = 1/cell;
  species HMCATOL in cell = 1/cell;
  species SARC in cell = 1/cell;
  species THR in cell = 1/cell;
  species GDHLA in cell = 1/cell;
  species $URIxt in cell = 1/cell;
  species IMNASP in cell = 1/cell;
  species C060 in cell = 1/cell;
  species KDO in cell = 1/cell;
  species ETH in cell = 1/cell;
  species GL in cell = 1/cell;
  species GN in cell = 1/cell;
  species a_26DM5M3OHCOA in cell = 1/cell;
  species HANTH in cell = 1/cell;
  species PTH in cell = 1/cell;
  species AKP in cell = 1/cell;
  species bAMPAL in cell = 1/cell;
  species COBALT in cell = 1/cell;
  species XAN in cell = 1/cell;
  species DU in cell = 1/cell;
  species a_5HIDAC in cell = 1/cell;
  species SEANSMET in cell = 1/cell;
  species PROTEIN in cell = 1/cell;
  species DHMP in cell = 1/cell;
  species DTGAL in cell = 1/cell;
  species DG in cell = 1/cell;
  species MSALC in cell = 1/cell;
  species DC in cell = 1/cell;
  species $GLUCxt in cell = 1/cell;
  species DA in cell = 1/cell;
  species HORD in cell = 1/cell;
  species $ORNxt in cell = 1/cell;
  species DMBZMZ in cell = 1/cell;
  species THBN in cell = 1/cell;
  species ADCOMN in cell = 1/cell;
  species GL3P in cell = 1/cell;
  species $FORMxt in cell = 1/cell;
  species ACAL in cell = 1/cell;
  species $CITxt in cell = 1/cell;
  species N4ACAMBL in cell = 1/cell;
  species ACAB in cell = 1/cell;
  species AN in cell = 1/cell;
  species TGLU in cell = 1/cell;
  species PIPD2CAR in cell = 1/cell;
  species AC in cell = 1/cell;
  species DPCOA in cell = 1/cell;
  species CYALA in cell = 1/cell;
  species AD in cell = 1/cell;
  species $GLC2xt in cell = 1/cell;
  species SUC6P in cell = 1/cell;
  species PEPTIDE in cell = 1/cell;
  species PEPTIDO in cell = 1/cell;
  species CLLT in cell = 1/cell;
  species SMBDH in cell = 1/cell;
  species GPP in cell = 1/cell;
  species HMNAPTH in cell = 1/cell;
  species CYS in cell = 1/cell;
  species GSN in cell = 1/cell;
  species $TYRxt in cell = 1/cell;
  species LTG in cell = 1/cell;
  species CYSGLY in cell = 1/cell;
  species a_2PCDPMDE in cell = 1/cell;
  species K6PG in cell = 1/cell;
  species GGSEMSC in cell = 1/cell;
  species GSA in cell = 1/cell;
  species TAGCR in cell = 1/cell;
  species ACOA in cell = 1/cell;
  species PANT in cell = 1/cell;
  species MKH2 in cell = 1/cell;
  species MGLUCOA in cell = 1/cell;
  species ACACP in cell = 1/cell;
  species $a_4HBZxt in cell = 1/cell;
  species TTHSTB in cell = 1/cell;
  species RSALA in cell = 1/cell;
  species SHDHACOA in cell = 1/cell;
  species SUCARG in cell = 1/cell;
  species G1COA in cell = 1/cell;
  species URGLY in cell = 1/cell;
  species URA in cell = 1/cell;
  species PHT in cell = 1/cell;
  species MGPPIX in cell = 1/cell;
  species $SERxt in cell = 1/cell;
  species XTHE in cell = 1/cell;
  species GLYCOLATE in cell = 1/cell;
  species HDECOA in cell = 1/cell;
  species DAA in cell = 1/cell;
  species NAPTHMSUCCOA in cell = 1/cell;
  species a_3H26DM5MHCOA in cell = 1/cell;
  species ppGpp in cell = 1/cell;
  species UDPGAL in cell = 1/cell;
  species DB4P in cell = 1/cell;
  species a_2O23DHFAC in cell = 1/cell;
  species UCNA in cell = 1/cell;
  species HOMOGEN in cell = 1/cell;
  species PC3A in cell = 1/cell;
  species PIN in cell = 1/cell;
  species METHMASAL in cell = 1/cell;
  species IVCOA in cell = 1/cell;
  species SFALA in cell = 1/cell;
  species PRBATP in cell = 1/cell;
  species MANN in cell = 1/cell;
  species SFIPYR in cell = 1/cell;
  species H3OP in cell = 1/cell;
  species GLU in cell = 1/cell;
  species PHEAM in cell = 1/cell;
  species DADP in cell = 1/cell;
  species PPAC in cell = 1/cell;
  species DUTP in cell = 1/cell;
  species PC6B in cell = 1/cell;
  species PC6A in cell = 1/cell;
  species ADCOHEX in cell = 1/cell;
  species UNAGA in cell = 1/cell;
  species FCYTC in cell = 1/cell;
  species CHOR in cell = 1/cell;
  species CATOL in cell = 1/cell;
  species PABA in cell = 1/cell;
  species UDPNAGEP in cell = 1/cell;
  species DTDP4ADDG in cell = 1/cell;
  species $RMNxt in cell = 1/cell;
  species UDPG2AA in cell = 1/cell;
  species LPS in cell = 1/cell;
  species HTDECOA in cell = 1/cell;
  species a_3PG in cell = 1/cell;
  species RHTDHACOA in cell = 1/cell;
  species ABUT in cell = 1/cell;
  species COUM in cell = 1/cell;
  species RHDHACOA in cell = 1/cell;
  species DAPIM in cell = 1/cell;
  species SUCC in cell = 1/cell;
  species BZ12DOL in cell = 1/cell;
  species MDAPIM in cell = 1/cell;
  species $CO2xt in cell = 1/cell;
  species GLUCR in cell = 1/cell;
  species MPPCOA in cell = 1/cell;
  species TAU in cell = 1/cell;
  species DANNA in cell = 1/cell;
  species HGLUSA in cell = 1/cell;
  species NFM in cell = 1/cell;
  species AACCOA in cell = 1/cell;
  species SAP in cell = 1/cell;
  species $LACTOSExt in cell = 1/cell;
  species HDDOCOA in cell = 1/cell;
  species DCTP in cell = 1/cell;
  species rGLUCYA in cell = 1/cell;
  species CNGLCS in cell = 1/cell;
  species $BIOMASS in cell = 1/cell;
  species $PHEACTxt in cell = 1/cell;
  species GMANU in cell = 1/cell;
  species $ASPxt in cell = 1/cell;
  species PRFICA in cell = 1/cell;
  species GLUAM in cell = 1/cell;
  species DTDPGLU in cell = 1/cell;
  species HSER in cell = 1/cell;
  species ACLAC in cell = 1/cell;
  species UPPMN_GN_LADGNMD_G_5DADA in cell = 1/cell;
  species RHBHACOA in cell = 1/cell;
  species $NACxt in cell = 1/cell;
  species ASN in cell = 1/cell;
  species CHETAL in cell = 1/cell;
  species bDG6P in cell = 1/cell;
  species ASB in cell = 1/cell;
  species METHF in cell = 1/cell;
  species CAIR in cell = 1/cell;
  species DHMVA in cell = 1/cell;
  species D6PGL in cell = 1/cell;
  species ASP in cell = 1/cell;
  species $PYRDXxt in cell = 1/cell;
  species Pi in cell = 1/cell;
  species DPHE in cell = 1/cell;
  species D6PGC in cell = 1/cell;
  species a_2OPMP in cell = 1/cell;
  species PPARDBZ in cell = 1/cell;
  species a_6HCHECBCOA in cell = 1/cell;
  species MCATOL in cell = 1/cell;
  species UPRG in cell = 1/cell;
  species HYGBYR in cell = 1/cell;
  species CHAC in cell = 1/cell;
  species ACCOA in cell = 1/cell;
  species a_2OPMB in cell = 1/cell;
  species SOT in cell = 1/cell;
  species FTHF in cell = 1/cell;
  species CHAM in cell = 1/cell;
  species PRPP in cell = 1/cell;
  species PRBAMP in cell = 1/cell;
  species OTHIO in cell = 1/cell;
  species GTAH in cell = 1/cell;
  species HST in cell = 1/cell;
  species CTP in cell = 1/cell;
  species HH in cell = 1/cell;
  species P3H5C in cell = 1/cell;
  species $C100xt in cell = 1/cell;
  species HEPPP in cell = 1/cell;
  species DISAC1P in cell = 1/cell;
  species MAN1P in cell = 1/cell;
  species SO4 in cell = 1/cell;
  species E4HGLU in cell = 1/cell;
  species SO3 in cell = 1/cell;
  species XMP in cell = 1/cell;
  species MACO in cell = 1/cell;
  species OLGRNS in cell = 1/cell;
  species MSALC4 in cell = 1/cell;
  species ADCHOR in cell = 1/cell;
  species SME in cell = 1/cell;
  species a_4PHEACCOA in cell = 1/cell;
  species $MANxt in cell = 1/cell;
  species SMTDR1P in cell = 1/cell;
  species HGCOA in cell = 1/cell;
  species AGL3P in cell = 1/cell;
  species S2MDH in cell = 1/cell;
  species CITR in cell = 1/cell;
  species ETFLA in cell = 1/cell;
  species HMB4PP in cell = 1/cell;
  species E4P in cell = 1/cell;
  species XTSINE in cell = 1/cell;
  species MALE in cell = 1/cell;
  species ARGSUCC in cell = 1/cell;
  species a_3KbGALC in cell = 1/cell;
  species $GLxt in cell = 1/cell;
  species DHLIPOYLPROTEIN in cell = 1/cell;
  species LIPOYLPROTEIN in cell = 1/cell;
  species GA6P in cell = 1/cell;
  species UACMAM in cell = 1/cell;
  species $GLYCOLATExt in cell = 1/cell;
  species $ASNxt in cell = 1/cell;
  species PHTD in cell = 1/cell;
  species PHEN in cell = 1/cell;
  species FERCOA in cell = 1/cell;
  species GLUTAU in cell = 1/cell;
  species NAD in cell = 1/cell;
  species $ATPxt in cell = 1/cell;
  species DCMP in cell = 1/cell;
  species OA in cell = 1/cell;
  species NAC in cell = 1/cell;
  species ARG in cell = 1/cell;
  species NAM in cell = 1/cell;
  species IMACP in cell = 1/cell;
  species DHAP in cell = 1/cell;
  species G3P in cell = 1/cell;
  species NAORN in cell = 1/cell;
  species $LEUxt in cell = 1/cell;
  species $GLCxt in cell = 1/cell;
  species CABM in cell = 1/cell;
  species TYRM in cell = 1/cell;
  species SLNMET in cell = 1/cell;
  species $CAFFxt in cell = 1/cell;
  species PNTO in cell = 1/cell;
  species a_3IP6OHCOAS in cell = 1/cell;
  species D1AP2OP in cell = 1/cell;
  species LYS in cell = 1/cell;
  species $PIxt in cell = 1/cell;
  species FSALAC in cell = 1/cell;
  species C100ACP in cell = 1/cell;
  species SAOPIM in cell = 1/cell;
  species SAH in cell = 1/cell;
  species A6RP in cell = 1/cell;
  species RHOHACOA in cell = 1/cell;
  species SAM in cell = 1/cell;
  species PPADSEL in cell = 1/cell;
  species a_2MBTCOA in cell = 1/cell;
  species $CYTDxt in cell = 1/cell;
  species DGLYCERATE in cell = 1/cell;
  species $NTBZxt in cell = 1/cell;
  species PHEACT in cell = 1/cell;
  species DTC in cell = 1/cell;
  species ABUTA in cell = 1/cell;
  species GA1P in cell = 1/cell;
  species R3R3HBUT in cell = 1/cell;
  species ATP in cell = 1/cell;
  species NO2 in cell = 1/cell;
  species RTHIO in cell = 1/cell;
  species C080ACP in cell = 1/cell;
  species $FERxt in cell = 1/cell;
  species ADCOMNP in cell = 1/cell;
  species CYST in cell = 1/cell;
  species DX5P in cell = 1/cell;
  species HIVCOA in cell = 1/cell;
  species a_4ACAMBA in cell = 1/cell;
  species AMACAL in cell = 1/cell;
  species GTP in cell = 1/cell;
  species AKG in cell = 1/cell;
  species KDPG in cell = 1/cell;
  species CHMUC in cell = 1/cell;
  species MTG in cell = 1/cell;
  species FMNH2 in cell = 1/cell;
  species CHCOA in cell = 1/cell;
  species HHXACOA in cell = 1/cell;
  species BASP in cell = 1/cell;
  species Kxt in cell = 1/cell;
  species APACP in cell = 1/cell;
  species F6P in cell = 1/cell;
  species $MLTxt in cell = 1/cell;
  species LEU in cell = 1/cell;
  species ADIPCOA in cell = 1/cell;
  species GTRNA in cell = 1/cell;
  species CAFF in cell = 1/cell;
  species CHETOH in cell = 1/cell;
  species AONA in cell = 1/cell;
  species a_3OADIPCOA in cell = 1/cell;
  species HX in cell = 1/cell;
  species HBNQ in cell = 1/cell;
  species MEOH in cell = 1/cell;
  species CAASP in cell = 1/cell;
  species NTBZ in cell = 1/cell;
  species PAPS in cell = 1/cell;
  species Cuxt in cell = 1/cell;
  species a_13PDG in cell = 1/cell;
  species Cd in cell = 1/cell;
  species a_3IP6OHCOA in cell = 1/cell;
  species NH3 in cell = 1/cell;
  species $AKGxt in cell = 1/cell;
  species bG2HCOUM in cell = 1/cell;
  species C060ACP in cell = 1/cell;
  species CHFAM in cell = 1/cell;
  species Cdxt in cell = 1/cell;
  species PYR in cell = 1/cell;
  species DHPY in cell = 1/cell;
  species $SO4xt in cell = 1/cell;
  species ACMUR in cell = 1/cell;
  species AHM in cell = 1/cell;
  species SER in cell = 1/cell;
  species $Naxt in cell = 1/cell;
  species $MALxt in cell = 1/cell;
  species DAMBUT in cell = 1/cell;
  species CTCOA in cell = 1/cell;
  species a_4OMC in cell = 1/cell;
  species MTYRM in cell = 1/cell;
  species HISTAMINE in cell = 1/cell;
  species PRY in cell = 1/cell;
  species C160ACP in cell = 1/cell;
  species F1P in cell = 1/cell;
  species HCYSI in cell = 1/cell;
  species UGAT in cell = 1/cell;
  species bLEU in cell = 1/cell;
  species SUCHSER in cell = 1/cell;
  species a_5HKN in cell = 1/cell;
  species PRLP in cell = 1/cell;
  species ALGNT in cell = 1/cell;
  species H3MCOA in cell = 1/cell;
  species BTNO in cell = 1/cell;
  species UPRGI in cell = 1/cell;
  species MOPCOA in cell = 1/cell;
  species HN6TL in cell = 1/cell;
  species LMDOL in cell = 1/cell;
  species a_2IPM in cell = 1/cell;
  species DMPP in cell = 1/cell;
  species CYTD in cell = 1/cell;
  species DHMAH in cell = 1/cell;
  species PRLC in cell = 1/cell;
  species F2P in cell = 1/cell;
  species LLAC in cell = 1/cell;
  species CYTC in cell = 1/cell;
  species AIR in cell = 1/cell;
  species $PROxt in cell = 1/cell;
  species OADIPCOA in cell = 1/cell;
  species METTHF in cell = 1/cell;
  species LAC in cell = 1/cell;
  species D4DG in cell = 1/cell;
  species HMSALCAH in cell = 1/cell;
  species TMANB in cell = 1/cell;
  species UDP in cell = 1/cell;
  species THSUL in cell = 1/cell;
  species PRAM in cell = 1/cell;
  species B1OL in cell = 1/cell;
  species $VNxt in cell = 1/cell;
  species HXSP in cell = 1/cell;
  species a_4PPNTE in cell = 1/cell;
  species C100 in cell = 1/cell;
  species A4IZM in cell = 1/cell;
  species UPPMNLADGMDDADA in cell = 1/cell;
  species GL3PCHOL in cell = 1/cell;
  species a_4PPNTO in cell = 1/cell;
  species IDZATAH in cell = 1/cell;
  species LLCT in cell = 1/cell;
  species DTDP4D6DM in cell = 1/cell;
  species ALA in cell = 1/cell;
  species URBUT in cell = 1/cell;
  species a_5HKNN in cell = 1/cell;
  species COB2ACDM in cell = 1/cell;
  species DTDP4D6DG in cell = 1/cell;
  species D6RP5P in cell = 1/cell;
  species GLR in cell = 1/cell;
  species FORM in cell = 1/cell;
  species DALT in cell = 1/cell;
  species GLY in cell = 1/cell;
  species GLX in cell = 1/cell;
  species ACP in cell = 1/cell;
  species PROP in cell = 1/cell;
  species N2SORN in cell = 1/cell;
  species GLC in cell = 1/cell;
  species a_4PHEACG in cell = 1/cell;
  species GLRSAH in cell = 1/cell;
  species AMOHEX in cell = 1/cell;
  species GLN in cell = 1/cell;
  species PHSER in cell = 1/cell;
  species DGTP in cell = 1/cell;
  species UDPG2A in cell = 1/cell;
  species $DAxt in cell = 1/cell;
  species UDPMNLADGMDDADA in cell = 1/cell;
  species BUTANAL in cell = 1/cell;
  species FGAR in cell = 1/cell;
  species $RIBxt in cell = 1/cell;
  species $GSNxt in cell = 1/cell;
  species UDCPP in cell = 1/cell;
  species FADH in cell = 1/cell;
  species $NH3xt in cell = 1/cell;
  species RIBFLAV in cell = 1/cell;
  species FGAM in cell = 1/cell;
  species DIG3P in cell = 1/cell;
  species I3AC in cell = 1/cell;
  species CN in cell = 1/cell;
  species AMP in cell = 1/cell;
  species OADIP in cell = 1/cell;
  species MDECPP in cell = 1/cell;
  species CMAR in cell = 1/cell;
  species COB1ACDM in cell = 1/cell;
  species DTMP in cell = 1/cell;
  species Cu in cell = 1/cell;
  species AM2OXH in cell = 1/cell;
  species GLUC in cell = 1/cell;
  species GMP in cell = 1/cell;
  species RSGLTH in cell = 1/cell;
  species UDPNAMA in cell = 1/cell;
  species C140 in cell = 1/cell;
  species NAMN in cell = 1/cell;
  species RL5P in cell = 1/cell;
  species C040COA in cell = 1/cell;
  species FOCYT in cell = 1/cell;
  species THFG in cell = 1/cell;
  species THSTB in cell = 1/cell;
  species SUCCSAL in cell = 1/cell;
  species NAPTHAH2 in cell = 1/cell;
  species PRFP in cell = 1/cell;
  species a_3URDPP in cell = 1/cell;
  species G6P in cell = 1/cell;
  species P5P in cell = 1/cell;
  species MICIT in cell = 1/cell;
  species a_4HBA in cell = 1/cell;
  species BZQ in cell = 1/cell;
  species FDP in cell = 1/cell;
  species HBECOA in cell = 1/cell;
  species NAGLUS in cell = 1/cell;
  species P5C in cell = 1/cell;
  species $C120xt in cell = 1/cell;
  species NAGLUP in cell = 1/cell;
  species TCHCATOL in cell = 1/cell;
  species a_2HPHEAC in cell = 1/cell;
  species HMSALC in cell = 1/cell;
  species UNAGAMUF in cell = 1/cell;
  species a_4HBZ in cell = 1/cell;
  species AGM in cell = 1/cell;
  species B1AL in cell = 1/cell;
  species $GLACxt in cell = 1/cell;
  species LIPA in cell = 1/cell;
  species HDDECOA in cell = 1/cell;
  species a_2HHPDD in cell = 1/cell;
  species LIPX in cell = 1/cell;
  species THMPP in cell = 1/cell;
  species C160 in cell = 1/cell;
  species SENCYS in cell = 1/cell;
  species a_5MDR in cell = 1/cell;
  species HCYS in cell = 1/cell;
  species N6AL in cell = 1/cell;
  species DTGC in cell = 1/cell;
  species UPPMN_GN_LADGNMDDADA in cell = 1/cell;
  species $DINxt in cell = 1/cell;
  species OCRO in cell = 1/cell;
  species NPRAN in cell = 1/cell;
  species CPP in cell = 1/cell;
  species $PIPCxt in cell = 1/cell;
  species HBUT in cell = 1/cell;
  species DT in cell = 1/cell;
  species AAC in cell = 1/cell;
  species a_4HPHEACCOA in cell = 1/cell;
  species A6RP5P2 in cell = 1/cell;
  species a_3HADIPCOA in cell = 1/cell;
  species BUTANOL in cell = 1/cell;
  species A6RP5P in cell = 1/cell;
  species a_4HPHEAC in cell = 1/cell;
  species IPP in cell = 1/cell;
  species DGMP in cell = 1/cell;
  species $O2xt in cell = 1/cell;
  species MSLACAH in cell = 1/cell;
  species C121ACP in cell = 1/cell;
  species ADP in cell = 1/cell;
  species MAN6P in cell = 1/cell;
  species ADN in cell = 1/cell;
  species a_4H4M2OGLUT in cell = 1/cell;
  species DTDP in cell = 1/cell;
  species DHPHE in cell = 1/cell;
  species HHXOCOA in cell = 1/cell;
  species FUMACTAC in cell = 1/cell;
  species HAC in cell = 1/cell;
  species UDPDGLUC in cell = 1/cell;
  species DGLU in cell = 1/cell;
  species GDP in cell = 1/cell;
  species THF in cell = 1/cell;
  species DGLS in cell = 1/cell;
  species VAL in cell = 1/cell;
  species PPACAL in cell = 1/cell;
  species R5P in cell = 1/cell;
  species aRIBAZOLE in cell = 1/cell;
  species HDOCOA in cell = 1/cell;
  species INO3P in cell = 1/cell;
  species H2O in cell = 1/cell;
  species FPP in cell = 1/cell;
  species RSALGLY in cell = 1/cell;
  species C140xt in cell = 1/cell;
  species $DUxt in cell = 1/cell;
  species a_5C2PCOA in cell = 1/cell;
  species HIBUTCOA in cell = 1/cell;
  species HOACOA in cell = 1/cell;
  species a_3MOP in cell = 1/cell;
  species THCYN in cell = 1/cell;
  species OSLHSER in cell = 1/cell;
  species IPPMAL in cell = 1/cell;
  species SELD in cell = 1/cell;
  species $LYSxt in cell = 1/cell;
  species Q in cell = 1/cell;
  species C120 in cell = 1/cell;
  species SELN in cell = 1/cell;
  species K in cell = 1/cell;
  species SUCCOA in cell = 1/cell;
  species HDACOA in cell = 1/cell;
  species SELT in cell = 1/cell;
  species AHHMP in cell = 1/cell;
  species TTRHBP in cell = 1/cell;
  species SMTDRB1P in cell = 1/cell;
  species $URAxt in cell = 1/cell;
  species RIB in cell = 1/cell;
  species GDPRMN in cell = 1/cell;
  species AHHMD in cell = 1/cell;
  species DST in cell = 1/cell;
  species a_6O2HCHCBCOA in cell = 1/cell;
  species SAMOB in cell = 1/cell;
  species I3ACT in cell = 1/cell;
  species ITC in cell = 1/cell;
  species CHOL in cell = 1/cell;
  species GLYCOGEN in cell = 1/cell;
  species DTDP4AADDG in cell = 1/cell;
  species a_3IP6OH in cell = 1/cell;
  species BETAH in cell = 1/cell;
  species MCIT in cell = 1/cell;
  species a_2M5IPH25Cc in cell = 1/cell;
  species HPMMBZQ in cell = 1/cell;
  species C040ACP in cell = 1/cell;
  species NAPTHAH in cell = 1/cell;
  species ITP in cell = 1/cell;
  species RNA in cell = 1/cell;
  species a_2M5IPH25Ct in cell = 1/cell;
  species ALAV in cell = 1/cell;
  species PL5P in cell = 1/cell;
  species ACETYLP in cell = 1/cell;
  species FADH2 in cell = 1/cell;
  species NAPTHOCOA in cell = 1/cell;
  species a_2H3CBNPYR in cell = 1/cell;
  species DGAL in cell = 1/cell;
  species KDOLIPIV in cell = 1/cell;
  species PPADY in cell = 1/cell;
  species MET in cell = 1/cell;
  species OHO in cell = 1/cell;
  species a_3IPB3EC in cell = 1/cell;
  species OROA in cell = 1/cell;
  species $SUCCOAxt in cell = 1/cell;
  species CBIO in cell = 1/cell;
  species AVALAM in cell = 1/cell;
  species PIPD6CAR in cell = 1/cell;
  species $DGLUxt in cell = 1/cell;
  species C181ACP in cell = 1/cell;
  species ROH in cell = 1/cell;
  species C140ACP in cell = 1/cell;
  species K2LIPIV in cell = 1/cell;
  species a_2MBECOA in cell = 1/cell;
  species PHOSPHOLIPID in cell = 1/cell;
  species CHBIO in cell = 1/cell;
  species $VNLxt in cell = 1/cell;
  species a_3A2OPP in cell = 1/cell;
  species IMZAC in cell = 1/cell;
  species CINVLIN in cell = 1/cell;
  species a_4H2OHEP in cell = 1/cell;
  species GCL in cell = 1/cell;
  species KDG in cell = 1/cell;
  species $PNTOxt in cell = 1/cell;
  species a_2PY46DC in cell = 1/cell;
  species $ALAxt in cell = 1/cell;
  species FMGT in cell = 1/cell;
  species INO4P in cell = 1/cell;
  species MALACP in cell = 1/cell;
  species THIAMIN in cell = 1/cell;
  species SRLH in cell = 1/cell;
  species a_2OMHMB in cell = 1/cell;
  species FMN in cell = 1/cell;
  species KDOP in cell = 1/cell;
  species $HISxt in cell = 1/cell;
  species SEMSC in cell = 1/cell;
  species AMADIPSAH in cell = 1/cell;
  species a_4HLT in cell = 1/cell;
  species RMN in cell = 1/cell;
  species UTP in cell = 1/cell;
  species INO1P in cell = 1/cell;
  species PIPC in cell = 1/cell;
  species THMP in cell = 1/cell;
  species cAMP in cell = 1/cell;
  species a_3CMUC in cell = 1/cell;
  species PRLAH in cell = 1/cell;
  species MACTAC in cell = 1/cell;
  species GAR in cell = 1/cell;
  species PPCOA in cell = 1/cell;
  species a_3DDAH7P in cell = 1/cell;
  species MCPYR in cell = 1/cell;
  species HIS in cell = 1/cell;
  species ITCCOA in cell = 1/cell;
  species TDHDP in cell = 1/cell;
  species a_5FTHF in cell = 1/cell;
  species SFLN in cell = 1/cell;
  species ACMAM in cell = 1/cell;
  species OPP in cell = 1/cell;
  species a_1APP2OL in cell = 1/cell;
  species OICAP in cell = 1/cell;
  species a_2PG in cell = 1/cell;
  species O4HBZ in cell = 1/cell;
  species DGDP in cell = 1/cell;
  species a_2MATACOA in cell = 1/cell;
  species MAL in cell = 1/cell;
  species a_2O6H in cell = 1/cell;
  species PQQH2 in cell = 1/cell;
  species a_3IP6OHS in cell = 1/cell;
  species TCHMUC in cell = 1/cell;
  species CIT in cell = 1/cell;
  species PRLOH in cell = 1/cell;
  species HLCARX in cell = 1/cell;
  species UDPNAG in cell = 1/cell;
  species UDPNAM in cell = 1/cell;
  species MLT in cell = 1/cell;
  species ER4P in cell = 1/cell;
  species a_2D3DX in cell = 1/cell;
  species a_3OPPA in cell = 1/cell;
  species $PHEAMxt in cell = 1/cell;
  species a_12DH8CNAPTH in cell = 1/cell;
  species HTDACOA in cell = 1/cell;
  species HYDROXYAKG in cell = 1/cell;
  species MTHPG in cell = 1/cell;
  species OAHSER in cell = 1/cell;
  species RHHXHACOA in cell = 1/cell;
  species AMBUT in cell = 1/cell;
  species CPPI in cell = 1/cell;
  species H2S in cell = 1/cell;
  species PHB in cell = 1/cell;
  species HISOLP in cell = 1/cell;
  species PHA in cell = 1/cell;
  species PHD in cell = 1/cell;
  species PHE in cell = 1/cell;
  species a_2OPMMB in cell = 1/cell;
  species PHO in cell = 1/cell;
  species a_2OHEPED in cell = 1/cell;
  species PHP in cell = 1/cell;
  species PHQ in cell = 1/cell;
  species ASER in cell = 1/cell;
  species $ADNxt in cell = 1/cell;
  species $ACxt in cell = 1/cell;
  species PTYR in cell = 1/cell;
  species OPCOA in cell = 1/cell;
  species SHHXHACOA in cell = 1/cell;
  species MTHF in cell = 1/cell;
  species COA in cell = 1/cell;
  species TRYP in cell = 1/cell;
  species $DHBZxt in cell = 1/cell;
  species UDPMNLADGMD in cell = 1/cell;
  species $DCxt in cell = 1/cell;
  species CO2 in cell = 1/cell;
  species A3H6P in cell = 1/cell;
  species $DALAxt in cell = 1/cell;
  species CONOL in cell = 1/cell;
  species MCTCOA in cell = 1/cell;
  species HMB in cell = 1/cell;

  // Reactions:
  ATPM: ATP => ADP + PI; v_1();
    v_1 = 1;
  I106: 5 GLY + UPPMN_GN_LADGNMDDADA => UPPMN_GN_LADGNMD_G_5DADA; v_2();
    v_2 = 1;
  I107: PPEPTIDO + DALA => PEPTIDO + $DALAxt; v_3();
    v_3 = 1;
  I108: DB4P + A6RP => D8RL + PI; v_4();
    v_4 = 1;
  I109: A6RP5P2 => A6RP + PI; v_5();
    v_5 = 1;
  I116: RL5P => DB4P + FORM; v_6();
    v_6 = 1;
  I51: GLAL + NAD => NADH + GLYCOLATE; v_7();
    v_7 = 1;
  I96: SAH => HCYS + ADN; v_8();
    v_8 = 1;
  m10: HEPPP + IPP => OPP + PPI; v_9();
    v_9 = 1;
  m11: DTMP + ATP -> DTDP + ADP; v_10();
    v_10 = 1;
  m14: HISOLP => PI + HISOL; v_11();
    v_11 = 1;
  m17: PNTO + ATP => ADP + a_4PPNTO; v_12();
    v_12 = 1;
  m18: ASP => CO2 + bALA; v_13();
    v_13 = 1;
  m5: IPP -> DMPP; v_14();
    v_14 = 1;
  m6: FPP + IPP => GGPP + PPI; v_15();
    v_15 = 1;
  m7: GGPP + IPP => PPPP + PPI; v_16();
    v_16 = 1;
  m8: PPPP + IPP => HPPP + PPI; v_17();
    v_17 = 1;
  m9: HPPP + IPP => HEPPP + PPI; v_18();
    v_18 = 1;
  R_Biomass: 0.5 PROTEIN + 0.028 DNA + 0.2 RNA + 0.3 PHOSPHOLIPID + 0.03 CAV + 0.025 LPS + 0.2266 PEPTIDO + 2.9 ATP => $BIOMASS + 2.9 ADP + 2.9 PI; v_19();
    v_19 = 1;
  R_Cofvit: 0.145 COA + 0.141 FAD + 0.243 FMN + 0.167 NAD + 0.149 NADP + 0.249 THF => CAV; v_20();
    v_20 = 1;
  R_DNA: 0.621 DATP + 0.997 DCTP + 0.621 DTTP + 0.997 DGTP + 4.4 ATP => 4.4 ADP + 4.4 PI + DNA; v_21();
    v_21 = 1;
  R_LPS: 1.908 LIPA + 3.229 ADPHEP + 16.96 UDPG + 29.03 UDPNAG + 5.64 NAGA1P => LPS + 3.229 ADP + 46 UDP; v_22();
    v_22 = 1;
  R_Peptido: 1.01 UDPNAM + 1.012 UDPNAG + 2.185 ALAALA + 1.092 ALA + 1.168 MDAPIM + 1.157 DGLU + 0.025 GLY + 0.055 SER + 0.016 THR + 0.014 LEU + 0.129 LYS + 0.018 ASP + 6.788 ATP + PPEPTIDO => PEPTIDO + 1.092 $DALAxt + 1.012 UDP + 1.01 UMP + 6.788 ADP + 6.788 PI; v_23();
    v_23 = 1;
  R_Phospholipid: 0.944 PE + 0.306 PG + 0.074 CL => PHOSPHOLIPID; v_24();
    v_24 = 1;
  R_Protein: 2.54256 ALA + 1.166434 ARG + 2.23596 ASN + 2.23596 ASP + 0.080219 CYS + 2.389426 GLN + 2.389426 GLU + 2.488502 GLY + 0.491274 HIS + 1.179365 ILE + 2.084902 LEU + 1.366511 LYS + 0.461356 MET + 0.776364 PHE + 1.183293 PRO + 1.1742 SER + 1.26003 THR + 0.002456 TRP + 0.267417 TYR + 1.851398 VAL + 40 ATP => 40 ADP + 40 PI + PROTEIN; v_25();
    v_25 = 1;
  R_RNA: 1.63 ATP + 0.339 GTP + 0.25 CTP + 0.27 UTP => 1.25 ADP + 1.25 PI + RNA; v_26();
    v_26 = 1;
  GLY_pgi1: G6P -> bDG6P; v_27();
    v_27 = 1;
  GLY_pgi2: G6P -> F6P; v_28();
    v_28 = 1;
  GLY_pgi3: bDG6P -> F6P; v_29();
    v_29 = 1;
  GLY_xanA: G6P -> G1P; v_30();
    v_30 = 1;
  GLY_fbp: FDP => F6P + PI; v_31();
    v_31 = 1;
  GLY_fda: FDP -> G3P + DHAP; v_32();
    v_32 = 1;
  GLY_tpiA: DHAP -> G3P; v_33();
    v_33 = 1;
  GLY_gap: G3P + PI + NAD -> NADH + a_13PDG; v_34();
    v_34 = 1;
  GLY_pgk: a_13PDG + ADP -> a_3PG + ATP; v_35();
    v_35 = 1;
  GLY_pgm: a_3PG -> a_2PG; v_36();
    v_36 = 1;
  GLY_eno: a_2PG -> PEP; v_37();
    v_37 = 1;
  GLY_pykAF: PEP + ADP => PYR + ATP; v_38();
    v_38 = 1;
  GLY_fad: ATP + AC + COA => AMP + PPI + ACCOA; v_39();
    v_39 = 1;
  GLY_R1: ACAL + NADH -> ETH + NAD; v_40();
    v_40 = 1;
  GLY_R2: AC + NADH -> ACAL + NAD; v_41();
    v_41 = 1;
  GLY_qedH: ETH + PQQ => PQQH2 + ACAL; v_42();
    v_42 = 1;
  TCA_gltA: ACCOA + OA => COA + CIT; v_43();
    v_43 = 1;
  TCA_acnAB: CIT -> ICIT; v_44();
    v_44 = 1;
  TCA_icd: ICIT + NADP -> NADPH + AKG + CO2; v_45();
    v_45 = 1;
  TCA_kgdAB: AKG + COA + NAD => SUCCOA + CO2 + NADH; v_46();
    v_46 = 1;
  TCA_sucDC: ADP + PI + SUCCOA -> ATP + SUCC + COA; v_47();
    v_47 = 1;
  TCA_sdhBA: SUCC + Q => FUM + QH2; v_48();
    v_48 = 1;
  TCA_fumC: FUM -> MAL; v_49();
    v_49 = 1;
  TCA_mdh: MAL + NAD -> NADH + OA; v_50();
    v_50 = 1;
  TCA_accC: PYR + ATP + CO2 => OA + ADP + PI; v_51();
    v_51 = 1;
  PPP_zwf: G6P + NADP -> D6PGL + NADPH; v_52();
    v_52 = 1;
  PPP_pgl: D6PGL => D6PGC; v_53();
    v_53 = 1;
  PPP_gnd: D6PGC + NADP => NADPH + CO2 + RL5P; v_54();
    v_54 = 1;
  PPP_rpe: RL5P -> X5P; v_55();
    v_55 = 1;
  PPP_rpiA: RL5P -> R5P; v_56();
    v_56 = 1;
  PPP_xanA: R1P -> R5P; v_57();
    v_57 = 1;
  PPP_tktA1: R5P + X5P -> G3P + S7P; v_58();
    v_58 = 1;
  PPP_tktA2: X5P + E4P -> F6P + G3P; v_59();
    v_59 = 1;
  PPP_tal: G3P + S7P -> E4P + F6P; v_60();
    v_60 = 1;
  PPP_rbsK: RIB + ATP => R5P + ADP; v_61();
    v_61 = 1;
  PPP_gcd: GLC + Q => G15L + QH2; v_62();
    v_62 = 1;
  PPP_R1: GLUC + FAD -> DHGL + FADH2; v_63();
    v_63 = 1;
  PPP_R2: DALT => KDG; v_64();
    v_64 = 1;
  PPP_R3: UDPG + 2 NAD => UDPDGLUC + 2 NADH; v_65();
    v_65 = 1;
  ED_eda: KDPG -> PYR + G3P; v_66();
    v_66 = 1;
  ED_kguK: KDG + ATP => K6PG + ADP; v_67();
    v_67 = 1;
  ED_kguD: K6PG + NADPH => D6PGC + NADP; v_68();
    v_68 = 1;
  ED_gnuK: GLUC + ATP => D6PGC + ADP; v_69();
    v_69 = 1;
  ED_edd: D6PGC -> KDPG; v_70();
    v_70 = 1;
  FRUC_fruK: F1P + ATP -> FDP + ADP; v_71();
    v_71 = 1;
  FRUC_fda: F1P => DHAP + T3; v_72();
    v_72 = 1;
  FRUC_adh: SOT + NAD -> FRU + NADH; v_73();
    v_73 = 1;
  FRUC_aceK: F2P => FRU + PI; v_74();
    v_74 = 1;
  FRUC_gbd: S6P + NADP -> SB1P + NADPH; v_75();
    v_75 = 1;
  MANN_R1: MAN6P -> F6P; v_76();
    v_76 = 1;
  MANN_xanA: MAN6P -> MAN1P; v_77();
    v_77 = 1;
  MANN_algD: GDPMAN + 2 NAD => GMANU + 2 NADH; v_78();
    v_78 = 1;
  MANN_algL: ALGNT => OLGRNS; v_79();
    v_79 = 1;
  MANN_algA: GDP + MAN1P => PI + GDPMAN; v_80();
    v_80 = 1;
  MANN_gmd: GDPMAN => G4D6DMAN; v_81();
    v_81 = 1;
  MANN_phaG: GDPMAN + MANN => GDP + MANN1; v_82();
    v_82 = 1;
  GALC_galE: UDPG -> UDPGAL; v_83();
    v_83 = 1;
  GALC_galU: G1P + UTP -> UDPG + PPI; v_84();
    v_84 = 1;
  GALC_gbd: bGLAC + NADPH -> a_3KbGALC + NADP; v_85();
    v_85 = 1;
  GALC_glgc: ATP + G1P => PPI + ADPG; v_86();
    v_86 = 1;
  GALC_glcs1: ADPG => ADP + GLYCOGEN; v_87();
    v_87 = 1;
  GALC_glcp: GLYCOGEN + PI => G1P; v_88();
    v_88 = 1;
  R0071: DGAL => D4DG; v_89();
    v_89 = 1;
  R0072: GCL + NAD -> GLUCR + NADH; v_90();
    v_90 = 1;
  R0073: D4DG -> a_25DOP + CO2; v_91();
    v_91 = 1;
  R0074: GLUCR => D4DG; v_92();
    v_92 = 1;
  R0075: a_2D3DX + NAD -> a_5H24DP + NADH; v_93();
    v_93 = 1;
  R0076: ASB => MDAC; v_94();
    v_94 = 1;
  R0077: MLT => 2 GLC; v_95();
    v_95 = 1;
  R0079: DGLS => ROH + GLC; v_96();
    v_96 = 1;
  R0080: CBIO => 2 bDGLC; v_97();
    v_97 = 1;
  R0084: F6P + GLN => GLU + GA6P; v_98();
    v_98 = 1;
  R0085: ACCOA + GA1P => NAGA1P + COA; v_99();
    v_99 = 1;
  R0086: UTP + NAGA1P => UDPNAG + PPI; v_100();
    v_100 = 1;
  R0087: UDPNAG + PEP => UDPNAGEP + PI; v_101();
    v_101 = 1;
  R0088: UDPNAGEP + NADPH => UDPNAM + NADP; v_102();
    v_102 = 1;
  R0090: CHBIO => 2 NADG; v_103();
    v_103 = 1;
  R0092: ACMAM + PI -> NAM6P; v_104();
    v_104 = 1;
  R0093: UDPNAG -> UACMAM; v_105();
    v_105 = 1;
  R0094: UDPNAG -> ACMAM + UDP; v_106();
    v_106 = 1;
  R0095: DTDPGLU -> DTGAL; v_107();
    v_107 = 1;
  R0098: UDPGAL + 2 NAD -> UGAT + 2 NADH; v_108();
    v_108 = 1;
  R0099: DTDPGLU + 2 NADP => DTGC + 2 NADPH; v_109();
    v_109 = 1;
  R0100: DTDP4D6DG => GDP4D6DM; v_110();
    v_110 = 1;
  R0101: GDP4D6DM + NADPH => GDPRMN + NADP; v_111();
    v_111 = 1;
  R0102: ACAL + NAD => NADH + AC; v_112();
    v_112 = 1;
  PYR_ldhA: LAC + NAD -> PYR + NADH; v_113();
    v_113 = 1;
  PYR_pta: ACETYLP + COA -> ACCOA + PI; v_114();
    v_114 = 1;
  PYR_ppc: PEP + CO2 => OA + PI; v_115();
    v_115 = 1;
  PYR_oadA: MAL + NAD => PYR + CO2 + NADH; v_116();
    v_116 = 1;
  R0109: OA => PYR + CO2; v_117();
    v_117 = 1;
  R0110: RGT + MTG => LTG; v_118();
    v_118 = 1;
  R0111: LTG => RGT + LAC; v_119();
    v_119 = 1;
  R0112: PYR + COA + NAD => ACCOA + CO2 + NADH; v_120();
    v_120 = 1;
  R0113: LLAC + 2 FCYTC => PYR + 2 FOCYT; v_121();
    v_121 = 1;
  R0114: ATP + PYR => AMP + PEP + PI; v_122();
    v_122 = 1;
  R0115: MAL + FAD => FADH2 + OA; v_123();
    v_123 = 1;
  R0116: ACCOA + GLX => MAL + COA; v_124();
    v_124 = 1;
  R0118: FORM + NAD => CO2 + NADH; v_125();
    v_125 = 1;
  R0119: H3OP + NADH => DGLYCERATE + NAD; v_126();
    v_126 = 1;
  R0120: HYDROXYAKG => PYR + GLX; v_127();
    v_127 = 1;
  R0121: a_2PPG => GLYCOLATE + PI; v_128();
    v_128 = 1;
  R0123: 2 GLX => H3OP + CO2; v_129();
    v_129 = 1;
  R0124: ICIT => SUCC + GLX; v_130();
    v_130 = 1;
  R0125: HPYR -> H3OP; v_131();
    v_131 = 1;
  R0127: HPYR + NADPH => DGLYCERATE + NADP; v_132();
    v_132 = 1;
  R0128: GLYCOLATE + Q -> GLX + QH2; v_133();
    v_133 = 1;
  R0129: GLYCOLATE + O2 => GLX + H2O2; v_134();
    v_134 = 1;
  R0130: PPIP + COA -> PPCOA + PI; v_135();
    v_135 = 1;
  R0131: HPCOA + NADP -> OPCOA + NADPH; v_136();
    v_136 = 1;
  R0132: OPCOA + O2 + NADPH -> MALCOA + NADP; v_137();
    v_137 = 1;
  R0133: P1AL + NAD => PROPYNOATE + NADH; v_138();
    v_138 = 1;
  R0134: 2 ACCOA -> COA + AACCOA; v_139();
    v_139 = 1;
  R0135: bALA + AKG -> a_3OPPA + GLU; v_140();
    v_140 = 1;
  R0136: ALA + a_3OPPA -> PYR + bALA; v_141();
    v_141 = 1;
  R0137: HPCOA + PI + ADP -> HPPA + COA + ATP; v_142();
    v_142 = 1;
  R0138: HPCOA -> PNCOA; v_143();
    v_143 = 1;
  R0139: ETFLA + PPCOA -> RTFLA + PNCOA; v_144();
    v_144 = 1;
  R0140: ATP + PROP -> PPI + PPADY; v_145();
    v_145 = 1;
  R0141: PPADY + COA -> AMP + PPCOA; v_146();
    v_146 = 1;
  R0142: PPADY + COA -> AMP + PPCOA; v_147();
    v_147 = 1;
  R0143: ATP + PPCOA + CO2 => ADP + PI + MOPCOA; v_148();
    v_148 = 1;
  R0144: METHMASAL + COA + NAD => PPCOA + CO2 + NADH; v_149();
    v_149 = 1;
  R0145: PPCOA + OA => MCIT + COA; v_150();
    v_150 = 1;
  R0146: MCIT => MACO; v_151();
    v_151 = 1;
  R0147: MICIT -> PYR + SUCC; v_152();
    v_152 = 1;
  R0149: SUCC + FAD => FADH2 + FUM; v_153();
    v_153 = 1;
  R0150: SUCCSAL + NAD => SUCC + NADH; v_154();
    v_154 = 1;
  R0151: GABA + AKG => SUCCSAL + GLU; v_155();
    v_155 = 1;
  R0152: B1OL + PQQ => B1AL + PQQH2; v_156();
    v_156 = 1;
  R0153: B1AL + NAD => BTNO + NADH; v_157();
    v_157 = 1;
  R0154: HBUT + NAD -> AAC + NADH; v_158();
    v_158 = 1;
  R0156: RHBCOA => PHB; v_159();
    v_159 = 1;
  R0157: SHBCOA -> RHBCOA; v_160();
    v_160 = 1;
  R0158: C040COA + NAD -> CTCOA + NADH; v_161();
    v_161 = 1;
  R0159: SHBCOA -> CTCOA; v_162();
    v_162 = 1;
  R0161: SHBCOA + NADP -> AACCOA + NADPH; v_163();
    v_163 = 1;
  R0162: SUCCOA + AAC -> SUCC + AACCOA; v_164();
    v_164 = 1;
  R0163: G1COA -> HGCOA; v_165();
    v_165 = 1;
  R0164: H3MCOA => ACCOA + AAC; v_166();
    v_166 = 1;
  R0165: BUTANAL + NADH -> BUTANOL + NAD; v_167();
    v_167 = 1;
  R0166: ATP + ITC + COA -> ADP + PI + ITCCOA; v_168();
    v_168 = 1;
  R0167: a_3OPPA + COA + NAD => ACCOA + CO2 + NADH; v_169();
    v_169 = 1;
  R0168: INO1P => MI + PI; v_170();
    v_170 = 1;
  R0169: INO3P => MI + PI; v_171();
    v_171 = 1;
  R0170: INO4P => MI + PI; v_172();
    v_172 = 1;
  R0171: NADH + Q => NAD + QH2; v_173();
    v_173 = 1;
  R0172: NADH + Q => NAD + QH2 + 3 Hxt; v_174();
    v_174 = 1;
  OXY_atpS: ADP + PI + 4 Hxt -> ATP; v_175();
    v_175 = 1;
  OXY_cyt1: QH2 + 0.5 O2 => Q + 2 Hxt; v_176();
    v_176 = 1;
  OXY_cyt2: QH2 + 0.5 O2 => Q + 4 Hxt; v_177();
    v_177 = 1;
  OXY_pet1: QH2 + 2 FCYTC => Q + 2 FOCYTC; v_178();
    v_178 = 1;
  OXY_pet2: 2 FOCYTC + 0.5 O2 => 2 FCYTC; v_179();
    v_179 = 1;
  OXY_ppa: PPI => 2 PI + Hxt; v_180();
    v_180 = 1;
  OXY_ppk: ATP + PPI => ADP + PPPI; v_181();
    v_181 = 1;
  R0179: DHAP + E4P => S17BP; v_182();
    v_182 = 1;
  R0180: MEOH + PQQ -> PQQH2 + FALD; v_183();
    v_183 = 1;
  R0181: 2 FOCYTC + 2 FALD + O2 => 2 CYTC + 2 FORM + 4 Hxt; v_184();
    v_184 = 1;
  Test1: FALD + NAD => FORM + NADH; v_185();
    v_185 = 1;
  R0182: MEOH + H2O2 => FALD; v_186();
    v_186 = 1;
  R0183: HMGT + NAD -> FMGT + NADH; v_187();
    v_187 = 1;
  R0185: RL5P + FALD => A3H6P; v_188();
    v_188 = 1;
  R0186: A3H6P -> F6P; v_189();
    v_189 = 1;
  R0188: ATP + CABM => ADP + CAP; v_190();
    v_190 = 1;
  R0189: ATP + NH3 + CO2 -> ADP + CAP; v_191();
    v_191 = 1;
  R0190: METTHF + NADH + CO2 + NH3 => GLY + THF + NAD; v_192();
    v_192 = 1;
  R0192: DALA + FAD => PYR + NH3 + FADH; v_193();
    v_193 = 1;
  R0193: NO2 + 3 NADH => 3 NAD + NH3; v_194();
    v_194 = 1;
  R0194: ASP => FUM + NH3; v_195();
    v_195 = 1;
  R0196: ASP + NH3 -> ASN; v_196();
    v_196 = 1;
  R0198: AKG + GLN + NADPH => NADP + 2 GLU; v_197();
    v_197 = 1;
  R0199: SO4 + ATP + GTP => APS + GDP + PPI + PI; v_198();
    v_198 = 1;
  R0200: APS + ATP => ADP + PAPS; v_199();
    v_199 = 1;
  R0201: PAPS + RTHIO => OTHIO + SO3 + PAP; v_200();
    v_200 = 1;
  R0202: SO3 + 3 NADPH -> H2S + 3 NADP + 4 Hxt; v_201();
    v_201 = 1;
  R0203: ACCOA + ATP + CO2 => MALCOA + ADP + PI; v_202();
    v_202 = 1;
  R0204: MALCOA + ACP -> MALACP + COA; v_203();
    v_203 = 1;
  R0205: ACCOA + ACP => ACACP + COA; v_204();
    v_204 = 1;
  FAS_B: ACACP + MALACP + 2 NADPH => 2 NADP + C040ACP + CO2 + ACP; v_205();
    v_205 = 1;
  FAS_HX: ACACP + 2 MALACP + 4 NADPH => 4 NADP + C060ACP + 2 CO2 + 2 ACP; v_206();
    v_206 = 1;
  FAS_O: ACACP + 3 MALACP + 6 NADPH => 6 NADP + C080ACP + 3 CO2 + 3 ACP; v_207();
    v_207 = 1;
  FAS_D: ACACP + 4 MALACP + 8 NADPH => 8 NADP + C100ACP + 4 CO2 + 4 ACP; v_208();
    v_208 = 1;
  FAS_DD: ACACP + 5 MALACP + 10 NADPH => 10 NADP + C120ACP + 5 CO2 + 5 ACP; v_209();
    v_209 = 1;
  FAS_ODU1: ACACP + 5 MALACP + 9 NADPH => 9 NADP + C121ACP + 5 CO2 + 5 ACP; v_210();
    v_210 = 1;
  FAS_TD: ACACP + 6 MALACP + 12 NADPH => 12 NADP + C140ACP + 6 CO2 + 6 ACP; v_211();
    v_211 = 1;
  FAS_ODU2: ACACP + 6 MALACP + 11 NADPH => 11 NADP + C141ACP + 6 CO2 + 6 ACP; v_212();
    v_212 = 1;
  FAS_HD: ACACP + 7 MALACP + 14 NADPH => 14 NADP + C160ACP + 7 CO2 + 7 ACP; v_213();
    v_213 = 1;
  FAS_ODU3: ACACP + 7 MALACP + 13 NADPH => 13 NADP + C161ACP + 7 CO2 + 7 ACP; v_214();
    v_214 = 1;
  FAS_OD: ACACP + 8 MALACP + 16 NADPH => 16 NADP + C180ACP + 8 CO2 + 8 ACP; v_215();
    v_215 = 1;
  FAS_ODU4: ACACP + 8 MALACP + 15 NADPH => 15 NADP + C181ACP + 8 CO2 + 8 ACP; v_216();
    v_216 = 1;
  R0212: ATP + 8 COA + 7 FAD + C160 + 7 NAD => 8 ACCOA + AMP + 7 FADH2 + 7 NADH + PPI; v_217();
    v_217 = 1;
  R0213: ATP + 5 COA + 4 FAD + C100 + 4 NAD => 5 ACCOA + AMP + 4 FADH2 + 4 NADH + PPI; v_218();
    v_218 = 1;
  R0214: ATP + 3 COA + 2 FAD + C060 + 2 NAD => 3 ACCOA + AMP + 2 FADH2 + 2 NADH + PPI; v_219();
    v_219 = 1;
  R0215: PYR + G3P => DX5P + CO2; v_220();
    v_220 = 1;
  R0216: DX5P + NADPH => MDE4P + NADP; v_221();
    v_221 = 1;
  R0217: MDE4P + CTP => CDPMDE + PPI; v_222();
    v_222 = 1;
  R0218: CDPMDE + ATP => a_2PCDPMDE + ADP; v_223();
    v_223 = 1;
  R0219: a_2PCDPMDE => MDECPP + CMP; v_224();
    v_224 = 1;
  R0220: MDECPP + NADH => NAD + HMB4PP; v_225();
    v_225 = 1;
  R0221: HMB4PP + NADH => NAD + IPP; v_226();
    v_226 = 1;
  R0222: DMPP + IPP => GPP + PPI; v_227();
    v_227 = 1;
  R0223: GPP + IPP => FPP + PPI; v_228();
    v_228 = 1;
  R0224: RVK + NADH => VK + NAD; v_229();
    v_229 = 1;
  R0225: GL + ATP => GL3P + ADP; v_230();
    v_230 = 1;
  R0226: GL + NAD -> T3 + NADH; v_231();
    v_231 = 1;
  R0228: T3 + NAD -> NADH + DGLYCERATE; v_232();
    v_232 = 1;
  R0229: DGLYCERATE + ATP => a_3PG + ADP; v_233();
    v_233 = 1;
  R0230: DGR => AGCR + C160; v_234();
    v_234 = 1;
  R0231: TAGCR => DGR + C160; v_235();
    v_235 = 1;
  R0232: GL3P + Q => DHAP + QH2; v_236();
    v_236 = 1;
  R0233: IMP => INS + PI; v_237();
    v_237 = 1;
  R0234: XMP => XTSINE + PI; v_238();
    v_238 = 1;
  R0235: PA + CTP => CDPDG + PPI; v_239();
    v_239 = 1;
  R0236: CDPDG + SER -> CMP + PS; v_240();
    v_240 = 1;
  R0237: PS => PE + CO2; v_241();
    v_241 = 1;
  R0238: DHAP + NADPH -> GL3P + NADP; v_242();
    v_242 = 1;
  R0239: CDPDG + GL3P -> CMP + PGP; v_243();
    v_243 = 1;
  R0240: PGP => PI + PG; v_244();
    v_244 = 1;
  R0241: CDPDG + PG => CMP + CL; v_245();
    v_245 = 1;
  R0242: GL3P + ACOA => AGL3P + COA; v_246();
    v_246 = 1;
  R0243: R5P + ATP -> PRPP + AMP; v_247();
    v_247 = 1;
  R0244: PRPP + GLN => PRAM + PPI + GLU; v_248();
    v_248 = 1;
  R0245: PRAM + ATP + GLY => GAR + ADP + PI; v_249();
    v_249 = 1;
  R0246: GAR + FTHF => FGAR + THF; v_250();
    v_250 = 1;
  R0247: FGAR + ATP + GLN => FGAM + GLU + ADP + PI; v_251();
    v_251 = 1;
  R0248: FGAM + ATP => AIR + ADP + PI; v_252();
    v_252 = 1;
  R0249: AIR + CO2 + ATP => CAIR + ADP + PI; v_253();
    v_253 = 1;
  R0250: CAIR + ATP + ASP -> SAICAR + ADP + PI; v_254();
    v_254 = 1;
  R0251: SAICAR -> AICAR + FUM; v_255();
    v_255 = 1;
  R0252: AICAR + FTHF => PRFICA + THF; v_256();
    v_256 = 1;
  R0253: PRFICA -> IMP; v_257();
    v_257 = 1;
  R0254: IMP + GTP + ASP => DCAMP + GDP + PI; v_258();
    v_258 = 1;
  R0255: DCAMP => FUM + AMP; v_259();
    v_259 = 1;
  R0256: IMP + NAD => XMP + NADH; v_260();
    v_260 = 1;
  R0257: XMP + ATP + GLN => GMP + GLU + AMP + PPI; v_261();
    v_261 = 1;
  R0258: ATP + XMP + NH3 => AMP + PPI + GMP; v_262();
    v_262 = 1;
  R0259: ATP => cAMP + PPI; v_263();
    v_263 = 1;
  R0260: GTP => cGMP + PPI; v_264();
    v_264 = 1;
  R0261: DGMP + ATP -> DGDP + ADP; v_265();
    v_265 = 1;
  R0262: IDP + ATP -> ITP + ADP; v_266();
    v_266 = 1;
  R0263: AD + PRPP => PPI + AMP; v_267();
    v_267 = 1;
  R0264: GN + PRPP => PPI + GMP; v_268();
    v_268 = 1;
  R0265: HYXN + PRPP => PPI + IMP; v_269();
    v_269 = 1;
  R0266: XAN + PRPP => PPI + XMP; v_270();
    v_270 = 1;
  R0267: DGTP => DG + PPPI; v_271();
    v_271 = 1;
  R0268: ATP + GTP => pppGpp + AMP; v_272();
    v_272 = 1;
  R0269: ppGpp => GDP + PPI; v_273();
    v_273 = 1;
  R0270: ATP + AMP => 2 ADP; v_274();
    v_274 = 1;
  R0271: ADP + RTHIO => DADP + OTHIO; v_275();
    v_275 = 1;
  R0272: DADP + ATP -> DATP + ADP; v_276();
    v_276 = 1;
  R0273: GMP + ATP -> GDP + ADP; v_277();
    v_277 = 1;
  R0274: GDP + ATP -> GTP + ADP; v_278();
    v_278 = 1;
  R0275: GDP + RTHIO => DGDP + OTHIO; v_279();
    v_279 = 1;
  R0276: DGDP + ATP -> DGTP + ADP; v_280();
    v_280 = 1;
  R0277: ARIB => AMP + R5P; v_281();
    v_281 = 1;
  R0278: ATP + DAMP -> ADP + DADP; v_282();
    v_282 = 1;
  R0279: pppGpp -> ppGpp + PI; v_283();
    v_283 = 1;
  R0280: AppppA => 2 ADP; v_284();
    v_284 = 1;
  R0281: AICAR + PPI -> A4IZM + PRPP; v_285();
    v_285 = 1;
  R0282: DGMP => DG + PI; v_286();
    v_286 = 1;
  R0283: GMP => GSN + PI; v_287();
    v_287 = 1;
  R0293: GMP + PPI -> GN + PRPP; v_288();
    v_288 = 1;
  R0294: DAMP -> DA + PI; v_289();
    v_289 = 1;
  R0301: AMP => ADN + PI; v_290();
    v_290 = 1;
  R0302: AMP => AD + R5P; v_291();
    v_291 = 1;
  R0303: DA -> DIN + NH3; v_292();
    v_292 = 1;
  R0304: ADN => AD + RIB; v_293();
    v_293 = 1;
  R0305: ADN => INS + NH3; v_294();
    v_294 = 1;
  R0306: INS => HYXN + RIB; v_295();
    v_295 = 1;
  R0309: XTSINE => XAN + RIB; v_296();
    v_296 = 1;
  R0311: GSN => GN + RIB; v_297();
    v_297 = 1;
  R0315: CAP + ASP => CAASP + PI; v_298();
    v_298 = 1;
  R0316: CAASP -> DOROA; v_299();
    v_299 = 1;
  R0318: DOROA + Q => QH2 + OROA; v_300();
    v_300 = 1;
  R0319: OROA + PRPP -> PPI + OMP; v_301();
    v_301 = 1;
  R0320: OMP => CO2 + UMP; v_302();
    v_302 = 1;
  R0321: ATP + UMP -> ADP + UDP; v_303();
    v_303 = 1;
  R0322: UDP + ATP -> UTP + ADP; v_304();
    v_304 = 1;
  R0323: UTP + GLN + ATP => GLU + CTP + ADP + PI; v_305();
    v_305 = 1;
  R0324: ATP + UTP + NH3 => ADP + PI + CTP; v_306();
    v_306 = 1;
  R0325: CDP + ATP -> CTP + ADP; v_307();
    v_307 = 1;
  R0326: CDP + RTHIO => DCDP + OTHIO; v_308();
    v_308 = 1;
  R0327: DCDP + ATP -> DCTP + ADP; v_309();
    v_309 = 1;
  R0328: DCTP => DUTP + NH3; v_310();
    v_310 = 1;
  R0329: DUTP => PPI + DUMP; v_311();
    v_311 = 1;
  R0330: DTDP + ATP -> DTTP + ADP; v_312();
    v_312 = 1;
  R0331: CMP + ATP -> ADP + CDP; v_313();
    v_313 = 1;
  R0332: OTHIO + NADPH => RTHIO + NADP; v_314();
    v_314 = 1;
  R0333: DCMP + ATP -> ADP + DCDP; v_315();
    v_315 = 1;
  R0334: URA + PRPP => UMP + PPI; v_316();
    v_316 = 1;
  R0335: URA + R5P -> PURI5P; v_317();
    v_317 = 1;
  R0336: DUMP + METTHF => DHF + DTMP; v_318();
    v_318 = 1;
  R0337: DUDP + ATP -> DUTP + ADP; v_319();
    v_319 = 1;
  R0338: UDP + RTHIO => OTHIO + DUDP; v_320();
    v_320 = 1;
  R0341: CTP => UTP + NH3; v_321();
    v_321 = 1;
  R0344: CMP => CYTD + PI; v_322();
    v_322 = 1;
  R0345: CYTS => URA + NH3; v_323();
    v_323 = 1;
  R0346: a_3URDPP => bALA + CO2 + NH3; v_324();
    v_324 = 1;
  R0347: DCMP => DC + PI; v_325();
    v_325 = 1;
  R0350: DTMP => DT + PI; v_326();
    v_326 = 1;
  R0351: a_5MCYT => DT + NH3; v_327();
    v_327 = 1;
  R0352: URBUT => AMBUT + CO2 + NH3; v_328();
    v_328 = 1;
  R0353: UMP => URI + PI; v_329();
    v_329 = 1;
  R0354: GLU + NH3 + ATP => GLN + ADP + PI; v_330();
    v_330 = 1;
  R0355: AKG + NH3 + NADPH -> GLU + NADP; v_331();
    v_331 = 1;
  R0356: GLN + 2 ATP + CO2 => GLU + CAP + 2 ADP + PI; v_332();
    v_332 = 1;
  R0357: ATP + GLU + CYS => ADP + PI + GCYS; v_333();
    v_333 = 1;
  R0358: ATP + GCYS + GLY => ADP + PI + RGT; v_334();
    v_334 = 1;
  R0360: OGT + NADPH => NADP + 2 RGT; v_335();
    v_335 = 1;
  R0361: GLN => GLU + NH3; v_336();
    v_336 = 1;
  R0362: GLU => GABA + CO2; v_337();
    v_337 = 1;
  R0367: ASP + GLN + ATP => ASN + GLU + AMP + PPI; v_338();
    v_338 = 1;
  R0369: ASP + O2 => OA + NH3 + H2O2; v_339();
    v_339 = 1;
  R0373: ASP + ATP -> ADP + BASP; v_340();
    v_340 = 1;
  R0374: BASP + NADPH -> NADP + PI + ASPSA; v_341();
    v_341 = 1;
  R0375: ASPSA + NADPH -> NADP + HSER; v_342();
    v_342 = 1;
  R0376: HSER + ATP => ADP + PHSER; v_343();
    v_343 = 1;
  R0377: PHSER => THR + PI; v_344();
    v_344 = 1;
  R0378: a_3PG + NAD -> NADH + PHP; v_345();
    v_345 = 1;
  R0379: PHP + GLU -> AKG + a_3PSER; v_346();
    v_346 = 1;
  R0380: a_3PSER => PI + SER; v_347();
    v_347 = 1;
  R0381: THF + SER -> GLY + METTHF; v_348();
    v_348 = 1;
  R0382: THR -> GLY + ACAL; v_349();
    v_349 = 1;
  R0383: THF + SAP => METTHF + NH3 + DHLIPOYLPROTEIN; v_350();
    v_350 = 1;
  R0384: GLY + LIPOYLPROTEIN => SAP + CO2; v_351();
    v_351 = 1;
  R0385: DHLIPOYLPROTEIN + NAD => NADH + LIPOYLPROTEIN; v_352();
    v_352 = 1;
  R0386: SER => PYR + NH3; v_353();
    v_353 = 1;
  R0387: THR => OBUT + NH3; v_354();
    v_354 = 1;
  R0388: LLCT -> CYS + NH3 + OBUT; v_355();
    v_355 = 1;
  R0389: CHOL + NAD => BETAH + NADH; v_356();
    v_356 = 1;
  R0390: BETAH + NAD => BET + NADH; v_357();
    v_357 = 1;
  R0391: BETAH + NADP => BET + NADPH; v_358();
    v_358 = 1;
  R0392: SARC + O2 => GLY + FALD + H2O2; v_359();
    v_359 = 1;
  R0394: GLU + ASPSA => AKG + DAMBUT; v_360();
    v_360 = 1;
  R0395: MTG + NADPH => HAC + NADP; v_361();
    v_361 = 1;
  R0399: CYS + OSLHSER => LLCT + SUCC; v_362();
    v_362 = 1;
  R0400: HCYS + MTHF -> THF + MET; v_363();
    v_363 = 1;
  R0401: MTHPG + HCYS => THPG + MET; v_364();
    v_364 = 1;
  R0402: ACCOA + HSER -> COA + OAHSER; v_365();
    v_365 = 1;
  R0403: OSLHSER + H2S -> HCYS + SUCC; v_366();
    v_366 = 1;
  R0404: OSLHSER -> SUCC + OBUT + NH3; v_367();
    v_367 = 1;
  R0406: MET + ATP => PPI + PI + SAM; v_368();
    v_368 = 1;
  R0407: SAH => SRLH + AD; v_369();
    v_369 = 1;
  R0409: OAHSER + CYS -> LLCT + AC; v_370();
    v_370 = 1;
  R0410: OAHSER + H2S => HCYS + AC; v_371();
    v_371 = 1;
  R0411: OAHSER + THSUL + RTHIO => HCYS + SO3 + OTHIO + AC; v_372();
    v_372 = 1;
  R0414: CYS => H2S + PYR + NH3; v_373();
    v_373 = 1;
  R0415: SER + ACCOA -> COA + ASER; v_374();
    v_374 = 1;
  R0416: ASER + H2S => CYS + AC; v_375();
    v_375 = 1;
  R0417: SER => AACL; v_376();
    v_376 = 1;
  R0418: CYSI => PYR + NH3 + TCYS; v_377();
    v_377 = 1;
  R0419: MCPYR + GLU => CYS + AKG; v_378();
    v_378 = 1;
  R0420: CYST + AKG -> SFPYR + GLU; v_379();
    v_379 = 1;
  R0421: SFALA + AKG => SFIPYR + GLU; v_380();
    v_380 = 1;
  R0422: ASER + THSUL => SSCYS + AC; v_381();
    v_381 = 1;
  R0424: ASER + THSUL + RTHIO => CYS + SO3 + OTHIO + AC; v_382();
    v_382 = 1;
  R0425: 2 PYR => ACLAC + CO2; v_383();
    v_383 = 1;
  R0426: ACLAC + NADPH -> NADP + DHMVA; v_384();
    v_384 = 1;
  R0427: DHMVA => OIVAL; v_385();
    v_385 = 1;
  R0428: OIVAL + GLU -> AKG + VAL; v_386();
    v_386 = 1;
  R0429: OIVAL + NH3 + NADH => VAL + NAD; v_387();
    v_387 = 1;
  R0431: PYR + OBUT => ABUT + CO2; v_388();
    v_388 = 1;
  R0432: ABUT + NADPH -> NADP + DHMP; v_389();
    v_389 = 1;
  R0433: DHMP => a_3MOP; v_390();
    v_390 = 1;
  R0434: a_3MOP + GLU -> AKG + ILE; v_391();
    v_391 = 1;
  R0435: a_3MOP + NH3 + NADH => ILE + NAD; v_392();
    v_392 = 1;
  R0437: ACCOA + OIVAL => COA + IPPMAL; v_393();
    v_393 = 1;
  R0438: IPPMAL -> a_2IPM; v_394();
    v_394 = 1;
  R0439: a_2IPM -> a_3IPM; v_395();
    v_395 = 1;
  R0440: a_3IPM + NAD -> NADH + OICAP; v_396();
    v_396 = 1;
  R0441: OICAP => a_4MOP + CO2; v_397();
    v_397 = 1;
  R0442: a_4MOP + GLU -> AKG + LEU; v_398();
    v_398 = 1;
  R0444: HIBUT + NAD => METHMASAL + NADH; v_399();
    v_399 = 1;
  R0445: LEU + NAD -> a_4MOP + NH3 + NADH; v_400();
    v_400 = 1;
  R0446: bLEU + NAD => O4MP + NH3 + NADH; v_401();
    v_401 = 1;
  R0448: a_4MOP => SMBDH + CO2; v_402();
    v_402 = 1;
  R0449: SMBDH + COA => IVCOA; v_403();
    v_403 = 1;
  R0450: IVCOA + FAD => MCTCOA + FADH2; v_404();
    v_404 = 1;
  R0451: IVCOA + FAD -> MCTCOA + FADH2; v_405();
    v_405 = 1;
  R0452: HIVCOA -> MCTCOA; v_406();
    v_406 = 1;
  R0454: OIVAL => S2MDH + CO2; v_407();
    v_407 = 1;
  ADD1: a_4MOP + COA + NAD => IVCOA + CO2 + NADH; v_408();
    v_408 = 1;
  ADD2: MCTCOA + ATP + CO2 => MGLUCOA + ADP + PI; v_409();
    v_409 = 1;
  ADD3: MGLUCOA => H3MCOA; v_410();
    v_410 = 1;
  ADD4: OIVAL + COA + NAD => MPPCOA + CO2 + NADH; v_411();
    v_411 = 1;
  ADD5: HIBUTCOA => HIBUT + COA; v_412();
    v_412 = 1;
  ADD6: a_3MOP + COA + NAD => a_2MBTCOA + CO2 + NADH; v_413();
    v_413 = 1;
  R0456: S2MDH + COA => MPPCOA; v_414();
    v_414 = 1;
  R0457: MPPCOA + O2 => a_2MPECOA; v_415();
    v_415 = 1;
  R0458: MPPCOA + FAD -> a_2MPECOA + FADH2; v_416();
    v_416 = 1;
  R0459: a_2MPECOA => HIBUTCOA; v_417();
    v_417 = 1;
  R0461: ALA + METHMASAL -> PYR + AMBUT; v_418();
    v_418 = 1;
  R0462: AMBUT + AKG -> METHMASAL + GLU; v_419();
    v_419 = 1;
  R0463: METHMASAL + NAD => METHYLMALONATE + NADH; v_420();
    v_420 = 1;
  R0465: a_3MOP => S2MBDH + CO2; v_421();
    v_421 = 1;
  R0466: S2MBDH + COA => a_2MBTCOA; v_422();
    v_422 = 1;
  R0467: a_2MBTCOA + O2 => a_2MBECOA; v_423();
    v_423 = 1;
  R0468: a_2MBTCOA + FAD -> a_2MBECOA + FADH2; v_424();
    v_424 = 1;
  R0469: a_2MBECOA => a_3H2MBCOA; v_425();
    v_425 = 1;
  R0470: a_3H2MBCOA + NAD -> a_2MATACOA + NADH; v_426();
    v_426 = 1;
  R0471: COA + a_2MATACOA => PPCOA + ACCOA; v_427();
    v_427 = 1;
  R0472: ASPSA + PYR => DHDP; v_428();
    v_428 = 1;
  R0473: DHDP + NADPH => NADP + TDHDP; v_429();
    v_429 = 1;
  R0474: TDHDP + SUCCOA => SAOPIM + COA; v_430();
    v_430 = 1;
  R0475: SAOPIM + GLU -> SDAPIM + AKG; v_431();
    v_431 = 1;
  R0476: SDAPIM => DAPIM + SUCC; v_432();
    v_432 = 1;
  R0477: DAPIM -> MDAPIM; v_433();
    v_433 = 1;
  R0478: MDAPIM => LYS + CO2; v_434();
    v_434 = 1;
  R0480: OAP => GDHLA + CO2; v_435();
    v_435 = 1;
  R0481: GDHLA + COA -> GCOA; v_436();
    v_436 = 1;
  R0482: CTCOA => SHBCOA; v_437();
    v_437 = 1;
  R0484: LYS + ACCOA -> N6AL + COA; v_438();
    v_438 = 1;
  R0485: a_5AAPT + NADH + CO2 -> AM2OXH + NAD; v_439();
    v_439 = 1;
  R0486: HN6TL => TMANB + GLY; v_440();
    v_440 = 1;
  R0487: TMANB + NAD => TMANBT + NADH; v_441();
    v_441 = 1;
  R0488: P5C + NAD => NADH + GLU; v_442();
    v_442 = 1;
  R0489: GLUGSAL + NAD => NADH + GLU; v_443();
    v_443 = 1;
  R0490: GLUGSAL => P5C; v_444();
    v_444 = 1;
  R0492: SUCGLU5S + NAD -> SUCGLU + NADH; v_445();
    v_445 = 1;
  R0493: SUCARG -> N2SORN + CO2 + 2 NH3; v_446();
    v_446 = 1;
  R0494: SUCCOA + ARG => COA + SUCARG; v_447();
    v_447 = 1;
  R0495: ARG => CITR + NH3; v_448();
    v_448 = 1;
  R0497: ORN => PRO + NH3; v_449();
    v_449 = 1;
  R0498: T4HP + FAD => P3H5C + FADH2; v_450();
    v_450 = 1;
  R0499: P3H5C + NAD => E4HGLU + NADH; v_451();
    v_451 = 1;
  R0500: E4HGLU + NAD -> HGLUSA + NADH; v_452();
    v_452 = 1;
  R0501: P3H5C -> HGLUSA; v_453();
    v_453 = 1;
  R0503: P3H5C + NADH => T4HP + NAD; v_454();
    v_454 = 1;
  R0504: SUCGLU => GLU + SUCC; v_455();
    v_455 = 1;
  R0505: ORN => PTRC + CO2; v_456();
    v_456 = 1;
  R0506: AGM => UREA + PTRC; v_457();
    v_457 = 1;
  R0507: ARG => CO2 + AGM; v_458();
    v_458 = 1;
  R0508: N4ACAB + NAD => ACAB + NADH; v_459();
    v_459 = 1;
  R0509: ABUTA + NADP -> GABA + NADPH; v_460();
    v_460 = 1;
  R0512: PRPP + ATP -> PPI + PRBATP; v_461();
    v_461 = 1;
  R0513: PRBATP => PPI + PRBAMP; v_462();
    v_462 = 1;
  R0514: PRBAMP => PRFP; v_463();
    v_463 = 1;
  R0515: PRFP => PRLP; v_464();
    v_464 = 1;
  R0516: PRLP + GLN => GLU + AICAR + DIG3P; v_465();
    v_465 = 1;
  R0517: DIG3P => IMACP; v_466();
    v_466 = 1;
  R0518: IMACP + GLU -> AKG + HISOLP; v_467();
    v_467 = 1;
  R0519: HISOL + 2 NAD => HIS + 2 NADH; v_468();
    v_468 = 1;
  R0520: HIS => UCNA + NH3; v_469();
    v_469 = 1;
  R0521: UCNA => IDZP; v_470();
    v_470 = 1;
  R0522: IDZP => FMMGLU; v_471();
    v_471 = 1;
  R0523: FMMGLU => GLU + FMM; v_472();
    v_472 = 1;
  SPON_FMM: FMM => FORM + NH3; v_473();
    v_473 = 1;
  R0524: HIS + SAM => NPMHIS + SAH; v_474();
    v_474 = 1;
  R0525: HIS => HISTAMINE + CO2; v_475();
    v_475 = 1;
  R0526: IDZATAH + NAD -> IDZ4AC + NADH; v_476();
    v_476 = 1;
  R0529: PHPYR + O2 => HOMOGEN + CO2; v_477();
    v_477 = 1;
  R0530: HOMOGEN + O2 => MACTAC; v_478();
    v_478 = 1;
  R0531: HOMOGEN + O2 => GTAH + CO2; v_479();
    v_479 = 1;
  R0532: MACTAC => FUMACTAC; v_480();
    v_480 = 1;
  R0533: FUMACTAC => AAC + FUM; v_481();
    v_481 = 1;
  R0534: a_2HHPDD => a_4H2OHEP; v_482();
    v_482 = 1;
  R0535: a_2OHEPED => a_4H2OHEP; v_483();
    v_483 = 1;
  R0536: ATP + a_4HPHEAC + COA => AMP + PPI + a_4HPHEACCOA; v_484();
    v_484 = 1;
  R0537: a_4HPHEACCOA + GLY => a_4HPHEACG + COA; v_485();
    v_485 = 1;
  R0538: TYR => TYRM + CO2; v_486();
    v_486 = 1;
  R0539: DHPHE => AE12BZ + CO2; v_487();
    v_487 = 1;
  R0540: MTYRM + SAM => HORD + SAH; v_488();
    v_488 = 1;
  R0541: DHPHEG + NAD -> DHMAH + NADH; v_489();
    v_489 = 1;
  R0542: PHE + AKG -> PHPYR + GLU; v_490();
    v_490 = 1;
  R0543: PHPYR + O2 => a_2HPHEAC + CO2; v_491();
    v_491 = 1;
  R0544: PHE => PHEAM + CO2; v_492();
    v_492 = 1;
  R0545: DPHE + FAD => PHPYR + NH3 + FADH2; v_493();
    v_493 = 1;
  R0546: ATP + PHEACT + COA => AMP + PPI + a_4PHEACCOA; v_494();
    v_494 = 1;
  R0547: a_4PHEACCOA + GLY => a_4PHEACG + COA; v_495();
    v_495 = 1;
  R0548: a_5HKN => a_5HKNN + CO2; v_496();
    v_496 = 1;
  R0549: a_5HTRY => SEROTONIN + CO2; v_497();
    v_497 = 1;
  R0550: TRP => TRYP + CO2; v_498();
    v_498 = 1;
  R0551: a_5HIDACTAL + NAD => a_5HIDAC + NADH; v_499();
    v_499 = 1;
  R0552: I3ACT + NAD => I3AC + NADH; v_500();
    v_500 = 1;
  R0553: XTHE => a_8MTXN; v_501();
    v_501 = 1;
  R0554: 2 HANTH + 2 O2 => CINVLIN + 2 H2O2; v_502();
    v_502 = 1;
  R0555: OAP + COA + NAD => GCOA + CO2 + NADH; v_503();
    v_503 = 1;
  AA_aroFGH: E4P + PEP => PI + a_3DDAH7P; v_504();
    v_504 = 1;
  AA_aroB: a_3DDAH7P => DQT + PI; v_505();
    v_505 = 1;
  AA_aroD: DQT -> DHSK; v_506();
    v_506 = 1;
  AA_aroE: DHSK + NADPH -> SME + NADP; v_507();
    v_507 = 1;
  AA_aroKL: SME + ATP => ADP + SME3P; v_508();
    v_508 = 1;
  AA_aroA: SME3P + PEP -> a_3PSME + PI; v_509();
    v_509 = 1;
  AA_aroC: a_3PSME => PI + CHOR; v_510();
    v_510 = 1;
  AA_trpEGD: CHOR + GLN => GLU + PYR + AN; v_511();
    v_511 = 1;
  AA_trpGD: AN + PRPP => PPI + NPRAN; v_512();
    v_512 = 1;
  AA_trpCF1: NPRAN => CPAD5P; v_513();
    v_513 = 1;
  AA_trpCF2: CPAD5P => CO2 + IGP; v_514();
    v_514 = 1;
  AA_trpBA: IGP + SER => G3P + TRP; v_515();
    v_515 = 1;
  R0570: IGP => INDOLE + G3P; v_516();
    v_516 = 1;
  R0571: SER + INDOLE => TRP; v_517();
    v_517 = 1;
  AA_pheA1: CHOR => PHEN; v_518();
    v_518 = 1;
  AA_tyrA: PHEN => CO2 + PHPYR; v_519();
    v_519 = 1;
  AA_tyrB: PHPYR + GLU -> AKG + TYR; v_520();
    v_520 = 1;
  R0575: PHEN + NAD => PHPYR + CO2 + NADH; v_521();
    v_521 = 1;
  AA_pheA2: ASP + PHEN => OA + PTYR; v_522();
    v_522 = 1;
  AA_pheB: PTYR => PHE + CO2; v_523();
    v_523 = 1;
  R0579: TH4P + NADP => P3H5C + NADPH; v_524();
    v_524 = 1;
  R0580: PHE + TTRHBP + O2 => TYR + DHBP; v_525();
    v_525 = 1;
  R0582: GLU + ATP => ADP + GLUP; v_526();
    v_526 = 1;
  R0583: GLUP + NADPH => NADP + PI + GLUGSAL; v_527();
    v_527 = 1;
  R0584: P5C + NADPH -> PRO + NADP; v_528();
    v_528 = 1;
  R0585: GLU + ACCOA => COA + NAGLU; v_529();
    v_529 = 1;
  R0586: NAGLU + ATP => ADP + NAGLUP; v_530();
    v_530 = 1;
  R0587: NAGLUP + NADPH -> NADP + PI + NAGLUS; v_531();
    v_531 = 1;
  R0588: NAGLUS + GLU -> AKG + NAORN; v_532();
    v_532 = 1;
  R0589: NAORN => AC + ORN; v_533();
    v_533 = 1;
  R0590: NAORN + GLU => ORN + NAGLU; v_534();
    v_534 = 1;
  R0591: ORN + CAP -> CITR + PI; v_535();
    v_535 = 1;
  R0592: CITR + ASP + ATP -> AMP + PPI + ARGSUCC; v_536();
    v_536 = 1;
  R0593: ARGSUCC -> FUM + ARG; v_537();
    v_537 = 1;
  R0594: ATP + MHDTN => ADP + PI + CBSARC; v_538();
    v_538 = 1;
  R0595: a_3URDPP -> bALA + CO2 + NH3; v_539();
    v_539 = 1;
  R0596: bAMPAL + NAD => bALA + NADH; v_540();
    v_540 = 1;
  R0597: FAD + PPCOA -> FADH2 + PNCOA; v_541();
    v_541 = 1;
  R0598: GLUPEP + TAU => PEPTIDE + GLUTAU; v_542();
    v_542 = 1;
  R0599: TAU + AKG + O2 => SO3 + AMACAL + SUCC + CO2; v_543();
    v_543 = 1;
  R0600: CLLT => H2AEP; v_544();
    v_544 = 1;
  R0601: CLLT + PYR -> PPACAL + ALA; v_545();
    v_545 = 1;
  R0602: MCOBL + PPACAL => HPPP + VB12; v_546();
    v_546 = 1;
  R0603: GLUPEP + SEMSC => PEPTIDE + GGSEMSC; v_547();
    v_547 = 1;
  R0604: PPHSER + SENCYS => SLCYSTH + PI; v_548();
    v_548 = 1;
  R0605: ATHSER + SENCYS => SLCYSTH + AC; v_549();
    v_549 = 1;
  R0606: SUCHSER + SENCYS => SLCYSTH + SUCC; v_550();
    v_550 = 1;
  R0607: SLCYSTH => SENCYS + NH3 + OBUT; v_551();
    v_551 = 1;
  R0609: SLNMET => MTHSNL + NH3 + OBUT; v_552();
    v_552 = 1;
  R0610: ATP + SLNMET => PI + PPI + SEANSMET; v_553();
    v_553 = 1;
  R0611: ASER + SELD => SENCYS + AC; v_554();
    v_554 = 1;
  R0612: ATP + SELD => AMP + SLNPP + PI; v_555();
    v_555 = 1;
  R0614: SELT + 3 NADP => SELD + 3 NADPH; v_556();
    v_556 = 1;
  R0615: ATP + SELN -> PPI + ADNSEL; v_557();
    v_557 = 1;
  R0616: ATP + ADNSEL => ADP + PPADSEL; v_558();
    v_558 = 1;
  R0617: CNGLCS => CYNHR + GLC; v_559();
    v_559 = 1;
  R0618: HCYSI + 2 CN => AAGCB + HCYS + THCYN; v_560();
    v_560 = 1;
  R0619: CYALA + GLU => rGLUCYA; v_561();
    v_561 = 1;
  R0620: CYALA + GLU => rGLUAPP + CO2; v_562();
    v_562 = 1;
  R0621: DGLU -> GLU; v_563();
    v_563 = 1;
  R0622: GLN => DGLU + NH3; v_564();
    v_564 = 1;
  R0623: DALA -> ALA; v_565();
    v_565 = 1;
  R0624: 2 DALA + ATP -> ALAALA + ADP + PI; v_566();
    v_566 = 1;
  R0626: bDG6P + NADP => D6PGL + NADPH; v_567();
    v_567 = 1;
  R0627: H2O2 + 2 RGT -> OGT; v_568();
    v_568 = 1;
  R0628: RGT => CYSGLY + GLU; v_569();
    v_569 = 1;
  R0629: RGT + LAMACID => CYSGLY + GLUAM; v_570();
    v_570 = 1;
  R0630: CYSGLY => CYS + GLY; v_571();
    v_571 = 1;
  R0631: RX + RGT => HX + RSGLTH; v_572();
    v_572 = 1;
  R0632: RSGLTH => RSALGLY + GLU; v_573();
    v_573 = 1;
  R0633: RSALAGLY => RSALA + GLY; v_574();
    v_574 = 1;
  R0634: UDPNAG + UDCP => UMP + UNAGA; v_575();
    v_575 = 1;
  R0635: UDPNAG => UACMAM; v_576();
    v_576 = 1;
  R0636: 2 NAD + UACMAM => 2 NADH + UACMAMU; v_577();
    v_577 = 1;
  R0637: UACMAM + UNAGA => UDP + UNAGAMU; v_578();
    v_578 = 1;
  R0638: DTTP + G1P => DTDPGLU + PPI; v_579();
    v_579 = 1;
  R0639: DTDPGLU => DTDP4D6DG; v_580();
    v_580 = 1;
  R0641: DTDP4D6DM + NADPH => DTDPRMN + NADP; v_581();
    v_581 = 1;
  R0642: ACCOA + DTDP4ADDG => COA + DTDP4AADDG; v_582();
    v_582 = 1;
  R0643: DTDP4AADDG + UNAGAMU => DTDP + UNAGAMUF; v_583();
    v_583 = 1;
  R0644: UNAGAMUF => UDCPP + OANTIGEN; v_584();
    v_584 = 1;
  R0645: UDPGAL => UDPGALFUR; v_585();
    v_585 = 1;
  R0646: C140ACP + UDPNAG -> ACP + UDPG2AA; v_586();
    v_586 = 1;
  R0647: UDPG2AA => UDPG2A + AC; v_587();
    v_587 = 1;
  R0648: UDPG2A + C140ACP => ACP + UDPG23A; v_588();
    v_588 = 1;
  R0649: UDPG23A => UMP + LIPX; v_589();
    v_589 = 1;
  R0650: LIPX + UDPG23A => UDP + DISAC1P; v_590();
    v_590 = 1;
  R0651: DISAC1P + ATP => ADP + LIPIV; v_591();
    v_591 = 1;
  R0652: LIPIV + CMPKDO => KDOLIPIV + CMP; v_592();
    v_592 = 1;
  R0653: KDOLIPIV + CMPKDO => K2LIPIV + CMP; v_593();
    v_593 = 1;
  R0654: K2LIPIV + C140ACP => LIPA + ACP; v_594();
    v_594 = 1;
  R0655: RL5P -> A5P; v_595();
    v_595 = 1;
  R0656: PEP + A5P => KDOP + PI; v_596();
    v_596 = 1;
  R0657: KDOP => KDO + PI; v_597();
    v_597 = 1;
  R0658: KDO + CTP => PPI + CMPKDO; v_598();
    v_598 = 1;
  R0659: S7P + ATP => ADPHEP + PPI; v_599();
    v_599 = 1;
  R0660: K2LIPIV + C120ACP => LIPA + ACP; v_600();
    v_600 = 1;
  R0662: DGR + ATP => ADP + PA; v_601();
    v_601 = 1;
  R0664: UDPNAM + ALA + ATP => ADP + PI + UDPNAMA; v_602();
    v_602 = 1;
  R0665: UDPNAMA + DGLU + ATP => UDPNAMAG + ADP + PI; v_603();
    v_603 = 1;
  R0666: UDCPP => UDCP + PI; v_604();
    v_604 = 1;
  R0667: UDPNAMAG + MDAPIM + ATP => UDPMNLADGMD + ADP + PI; v_605();
    v_605 = 1;
  R0668: UDPMNLADGMD + ALAALA + ATP => UDPMNLADGMDDADA + ADP + PI; v_606();
    v_606 = 1;
  R0669: UDPMNLADGMDDADA + UDCP => UPPMNLADGMDDADA + UMP; v_607();
    v_607 = 1;
  R0670: UPPMNLADGMDDADA + UDPNAG => UPPMN_GN_LADGMDDADA + UDP; v_608();
    v_608 = 1;
  R0671: UPPMN_GN_LADGMDDADA + ATP + NH3 => UPPMN_GN_LADGNMDDADA + ADP + PI; v_609();
    v_609 = 1;
  R0672: UPPMN_GN_LADGNMD_G_5DADA => UDCPP + PPEPTIDO; v_610();
    v_610 = 1;
  R0673: ACALA => ACMUR + ALA; v_611();
    v_611 = 1;
  R0675: AIR + NAD => AHM + 2 FORM + NADH; v_612();
    v_612 = 1;
  R0676: AHM + ATP => AHMP + ADP; v_613();
    v_613 = 1;
  R0677: AHMP + ATP => AHMPP + ADP; v_614();
    v_614 = 1;
  R0678: THZP + AHMPP => THMP + PPI; v_615();
    v_615 = 1;
  R0679: THMP + ADP -> THIAMIN + ATP; v_616();
    v_616 = 1;
  R0680: THMP + ATP -> THMPP + ADP; v_617();
    v_617 = 1;
  R0681: GTP => D6RP5P + FORM + PPI; v_618();
    v_618 = 1;
  R0682: D6RP5P => A6RP5P + NH3; v_619();
    v_619 = 1;
  R0683: A6RP5P + NADPH => A6RP5P2 + NADP; v_620();
    v_620 = 1;
  R0685: 2 D8RL => RIBFLAV + A6RP; v_621();
    v_621 = 1;
  R0686: RIBFLAV + ATP => FMN + ADP; v_622();
    v_622 = 1;
  R0687: FMN + ATP => FAD + PPI; v_623();
    v_623 = 1;
  R0688: RIBFLAV => DMBZMZ; v_624();
    v_624 = 1;
  R0689: NACN + DMBZMZ => NAC + PPARDBZ; v_625();
    v_625 = 1;
  R0690: PPARDBZ => aRIBAZOLE + PI; v_626();
    v_626 = 1;
  R0691: E4P + NAD -> ER4P + NADH; v_627();
    v_627 = 1;
  R0692: ER4P + NAD -> OHB + NADH; v_628();
    v_628 = 1;
  R0693: OHB + GLU -> PHT + AKG; v_629();
    v_629 = 1;
  R0694: PHT => a_4HLT + PI; v_630();
    v_630 = 1;
  R0695: a_4HLT => PYRDX; v_631();
    v_631 = 1;
  R0696: PHT + NAD => a_3A2OPP + NADH + CO2; v_632();
    v_632 = 1;
  R0697: a_3A2OPP + DX5P => P5P + PI; v_633();
    v_633 = 1;
  R0698: PYRDX + ATP => P5P + ADP; v_634();
    v_634 = 1;
  R0700: P5P + O2 => PL5P + H2O2; v_635();
    v_635 = 1;
  R0702: PL + ATP => PL5P + ADP; v_636();
    v_636 = 1;
  R0703: PDLA5P + O2 => PL5P + H2O2 + NH3; v_637();
    v_637 = 1;
  R0704: PDLA + ATP => PDLA5P + ADP; v_638();
    v_638 = 1;
  R0706: PYRDX + O2 -> PL + H2O2; v_639();
    v_639 = 1;
  R0707: PL + O2 + NH3 -> PDLA + H2O2; v_640();
    v_640 = 1;
  R0708: ASP + O2 => IMNASP + H2O2; v_641();
    v_641 = 1;
  R0709: IMNASP + DHAP => QA + PI; v_642();
    v_642 = 1;
  R0710: QA + PRPP => NACN + CO2 + PPI; v_643();
    v_643 = 1;
  R0711: NAC + PRPP -> NACN + PPI; v_644();
    v_644 = 1;
  R0712: NACN + ATP => PPI + NAAD; v_645();
    v_645 = 1;
  R0713: NACN => NACD + PI; v_646();
    v_646 = 1;
  R0714: ATP + NAMN -> PPI + NAD; v_647();
    v_647 = 1;
  R0715: NAMN => NAMD + PI; v_648();
    v_648 = 1;
  R0716: NAMD => NAM + RIB; v_649();
    v_649 = 1;
  R0717: NAAD + ATP + GLN => NAD + AMP + PPI + GLU; v_650();
    v_650 = 1;
  R0718: NADP + NADH -> NADPH + NAD; v_651();
    v_651 = 1;
  R0719: NAD + ATP => NADP + ADP; v_652();
    v_652 = 1;
  R0722: OIVAL + METTHF => AKP + THF; v_653();
    v_653 = 1;
  R0723: AKP + NADPH => NADP + PANT; v_654();
    v_654 = 1;
  R0724: PANT + bALA + ATP => AMP + PPI + PNTO; v_655();
    v_655 = 1;
  R0725: a_4PPNTO + CTP + CYS => CMP + PPI + a_4PPNCYS; v_656();
    v_656 = 1;
  R0726: a_4PPNCYS => CO2 + a_4PPNTE; v_657();
    v_657 = 1;
  R0727: a_4PPNTE + ATP -> PPI + DPCOA; v_658();
    v_658 = 1;
  R0728: DPCOA + ATP => ADP + COA; v_659();
    v_659 = 1;
  R0729: ACP => a_4PPNTE + APACP; v_660();
    v_660 = 1;
  R0730: ALA + CHCOA -> CO2 + COA + AONA; v_661();
    v_661 = 1;
  R0731: SAM + AONA -> SAMOB + DANNA; v_662();
    v_662 = 1;
  R0732: CO2 + DANNA + ATP -> DTB + PI + ADP; v_663();
    v_663 = 1;
  R0733: DTB + CYS => ALA + BT; v_664();
    v_664 = 1;
  R0734: ATP + BT -> PPI + BT5AMP; v_665();
    v_665 = 1;
  R0735: BT5AMP + APCARX => AMP + HLCARX; v_666();
    v_666 = 1;
  R0736: GTP => FORM + AHTD; v_667();
    v_667 = 1;
  R0737: AHTD => DHP + PPI; v_668();
    v_668 = 1;
  R0738: DHP => AHHMP + GLAL; v_669();
    v_669 = 1;
  R0739: AHHMP + ATP => AMP + AHHMD; v_670();
    v_670 = 1;
  R0740: CHOR + GLN => ADCHOR + GLU; v_671();
    v_671 = 1;
  R0741: ADCHOR => PYR + PABA; v_672();
    v_672 = 1;
  R0742: PABA + AHHMD => PPI + DHPT; v_673();
    v_673 = 1;
  R0743: PABA + AHHMP => DHPT; v_674();
    v_674 = 1;
  R0744: DHPT + ATP + GLU => ADP + PI + DHF; v_675();
    v_675 = 1;
  R0745: DHF + NADPH => NADP + THF; v_676();
    v_676 = 1;
  R0747: DHF + NADP -> FOL + NADPH; v_677();
    v_677 = 1;
  R0749: FOL + NADPH => THF + NADP; v_678();
    v_678 = 1;
  R0750: THF + ATP + GLU -> ADP + PI + THFG; v_679();
    v_679 = 1;
  R0751: AHTD => PYTHP + PPPI; v_680();
    v_680 = 1;
  R0752: DHBP + NADH -> TTRHBP + NAD; v_681();
    v_681 = 1;
  R0753: METTHF + NADP -> METHF + NADPH; v_682();
    v_682 = 1;
  R0754: METHF -> FTHF; v_683();
    v_683 = 1;
  R0755: METTHF + NADH => MTHF + NAD; v_684();
    v_684 = 1;
  R0756: URGLY => GLX + 2 NH3 + CO2; v_685();
    v_685 = 1;
  R0757: FTHF => FORM + THF; v_686();
    v_686 = 1;
  R0759: GAR + METHF => FGAR + THF; v_687();
    v_687 = 1;
  R0760: METHF => a_5FTHF; v_688();
    v_688 = 1;
  R0761: GLU + TGLU + ATP => GTRNA + AMP + PPI; v_689();
    v_689 = 1;
  R0762: GTRNA + NADPH => GSA + NADP + TGLU; v_690();
    v_690 = 1;
  R0763: GSA => ALAV; v_691();
    v_691 = 1;
  R0764: 2 ALAV => PBG; v_692();
    v_692 = 1;
  R0765: 4 PBG => HMB + 4 NH3; v_693();
    v_693 = 1;
  R0766: HMB => UPRG; v_694();
    v_694 = 1;
  R0767: SAM + UPRG => SAH + PC2; v_695();
    v_695 = 1;
  R0768: PC2 + NAD => NADH + SHCL; v_696();
    v_696 = 1;
  R0769: SHCL => SHEME; v_697();
    v_697 = 1;
  R0770: UPRG => 4 CO2 + CPP; v_698();
    v_698 = 1;
  R0771: CPP + 2 SAM => PPHG + 2 CO2 + 2 MET + 2 DA; v_699();
    v_699 = 1;
  R0772: CPP + O2 => PPHG + 2 CO2; v_700();
    v_700 = 1;
  R0773: PPIX => PTH; v_701();
    v_701 = 1;
  R0774: UPRGI => CPPI + 4 CO2; v_702();
    v_702 = 1;
  R0775: ATP + PPIX + MG => ADP + PI + MGPPIX; v_703();
    v_703 = 1;
  R0776: SAM + PC2 => SAH + PC3A; v_704();
    v_704 = 1;
  R0777: PC3A + O2 => PC3B; v_705();
    v_705 = 1;
  R0778: SAM + PC3B => SAH + PC4; v_706();
    v_706 = 1;
  R0779: SAM + PC4 => SAH + PC5; v_707();
    v_707 = 1;
  R0780: PC5 + SAM => PC6A + AC + SAH; v_708();
    v_708 = 1;
  R0781: PC6A + NADPH => PC6B + NADP; v_709();
    v_709 = 1;
  R0782: 2 SAM + PC6B => 2 SAH + PC8X + CO2; v_710();
    v_710 = 1;
  R0783: PC8X => HYGBYR; v_711();
    v_711 = 1;
  R0784: HYGBYR + 2 GLN + 2 ATP => HYGACDM + 2 PI + 2 GLU + 2 ADP; v_712();
    v_712 = 1;
  R0785: HYGACDM + COBALT + ATP => COB2ACDM + PI + ADP; v_713();
    v_713 = 1;
  R0786: COB2ACDM + NADH => COB1ACDM + NAD; v_714();
    v_714 = 1;
  R0787: COB1ACDM + ATP -> ADCOBACD + PPPI; v_715();
    v_715 = 1;
  R0788: ADCOBACD + 4 GLN + 4 ATP => ADCOHEX + 4 GLU + 4 PI + 4 ADP; v_716();
    v_716 = 1;
  R0789: ADCOHEX + a_1APP2OL => ADCOMN; v_717();
    v_717 = 1;
  R0790: ADCOMN + ATP => ADCOMNP + ADP; v_718();
    v_718 = 1;
  R0791: ADCOMN + GTP => ADCOMNP + GDP; v_719();
    v_719 = 1;
  R0792: ADCOHEX + D1AP2OP + ATP => ADCOMNP + ADP + PI; v_720();
    v_720 = 1;
  R0793: ADCOMNP + GTP => ADGCOMN + PPI; v_721();
    v_721 = 1;
  R0794: ADGCOMN + aRIBAZOLE => VB12COZ + GMP; v_722();
    v_722 = 1;
  R0795: DMK + SAM => SAH + MKH2; v_723();
    v_723 = 1;
  R0796: PTNPHQ + SAM => PHQ + SAH; v_724();
    v_724 = 1;
  R0797: CHOR => a_4HBZ + PYR; v_725();
    v_725 = 1;
  R0798: a_4HBZ + OPP => O4HBZ + PPI; v_726();
    v_726 = 1;
  R0799: O4HBZ => CO2 + a_2OPPP; v_727();
    v_727 = 1;
  R0800: a_2OPPP + O2 + NADPH => a_2O6H + NADP; v_728();
    v_728 = 1;
  R0801: a_2O6H + SAM => a_2OPMP + SAH; v_729();
    v_729 = 1;
  R0802: a_2OPMP + O2 + NADPH => a_2OPMB + NADP; v_730();
    v_730 = 1;
  R0803: a_2OPMB + SAM => a_2OPMMB + SAH; v_731();
    v_731 = 1;
  R0804: a_2OPMMB + O2 + NADPH => a_2OMHMB + NADP; v_732();
    v_732 = 1;
  R0805: a_2OMHMB + SAM => Q + SAH; v_733();
    v_733 = 1;
  R0808: HPMMBZQ + O2 + NADPH => HPMHMBZQ + NADP; v_734();
    v_734 = 1;
  TRANS_AC: $ACxt + Hxt -> AC; v_735();
    v_735 = 1;
  TRANS_ADNr: $ADNxt + Hxt -> ADN; v_736();
    v_736 = 1;
  TRANS_BZ: $BZxt => BZ; v_737();
    v_737 = 1;
  TRANS_CIT: $CITxt + Hxt -> CIT; v_738();
    v_738 = 1;
  TRANS_CO2: $CO2xt -> CO2; v_739();
    v_739 = 1;
  TRANS_DC: $DCxt + Hxt => DC; v_740();
    v_740 = 1;
  TRANS_DG: $DGxt + Hxt => DG; v_741();
    v_741 = 1;
  TRANS_DINr: $DINxt + Hxt -> DIN; v_742();
    v_742 = 1;
  TRANS_DIN: $DINxt + Hxt => DIN; v_743();
    v_743 = 1;
  TRANS_DT: $DTxt + Hxt => DT; v_744();
    v_744 = 1;
  TRANS_DU: $DUxt + Hxt => DU; v_745();
    v_745 = 1;
  TRANS_FORM: FORM => $FORMxt; v_746();
    v_746 = 1;
  TRANS_FRUPTS: $FRUxt + PEP => PYR + F1P; v_747();
    v_747 = 1;
  TRANS_FUM: $FUMxt + Hxt => FUM; v_748();
    v_748 = 1;
  TRANS_GL3P: $GL3Pxt + Hxt -> GL3P; v_749();
    v_749 = 1;
  TRANS_GLAC: $GLACxt + ATP => GLAC + ADP + PI; v_750();
    v_750 = 1;
  TRANS_glk: $GLCxt + ATP => G6P + ADP; v_751();
    v_751 = 1;
  TRANS_glk2: $bDGLCxt + ATP => bDG6P + ADP; v_752();
    v_752 = 1;
  TRANS_GLN: $GLNxt + ATP => GLN + ADP + PI; v_753();
    v_753 = 1;
  TRANS_GLUC: $GLUCxt + Hxt => GLUC; v_754();
    v_754 = 1;
  TRANS_GL: $GLxt -> GL; v_755();
    v_755 = 1;
  TRANS_GSNr: $GSNxt + Hxt -> GSN; v_756();
    v_756 = 1;
  TRANS_GSN: $GSNxt + Hxt => GSN; v_757();
    v_757 = 1;
  TRANS_INSr: $INSxt + Hxt -> INS; v_758();
    v_758 = 1;
  TRANS_INS: $INSxt + Hxt => INS; v_759();
    v_759 = 1;
  TRANS_LAC: $LACxt + Hxt -> LAC; v_760();
    v_760 = 1;
  TRANS_MAL: $MALxt + Hxt => MAL; v_761();
    v_761 = 1;
  TRANS_MAN: $MANxt + ATP => MAN6P + ADP; v_762();
    v_762 = 1;
  TRANS_METABC: $METxt + ATP => MET + ADP + PI; v_763();
    v_763 = 1;
  TRANS_MLT: $MLTxt + ATP => MLT + ADP + PI; v_764();
    v_764 = 1;
  TRANS_NAC: $NACxt => NAC; v_765();
    v_765 = 1;
  TRANS_ORNARGat: $ORNxt + ARG -> ORN + $ARGxt; v_766();
    v_766 = 1;
  TRANS_PNTO: $PNTOxt + $Naxt => PNTO + Na; v_767();
    v_767 = 1;
  TRANS_PYRDX: $PYRDXxt -> PYRDX; v_768();
    v_768 = 1;
  TRANS_PYR: $PYRxt + Hxt -> PYR; v_769();
    v_769 = 1;
  TRANS_RIB: $RIBxt + ATP => RIB + ADP + PI; v_770();
    v_770 = 1;
  TRANS_RMN: $RMNxt + Hxt -> RMN; v_771();
    v_771 = 1;
  TRANS_SO4ABC: $SO4xt + ATP => SO4 + ADP + PI; v_772();
    v_772 = 1;
  TRANS_SO4: $SO4xt + Hxt => SO4; v_773();
    v_773 = 1;
  TRANS_SUCC: $SUCCxt + Hxt -> SUCC; v_774();
    v_774 = 1;
  TRANS_SUCABC: $SUCxt + ATP => SUC6P + ADP; v_775();
    v_775 = 1;
  TRANS_URA: $URAxt + Hxt => URA; v_776();
    v_776 = 1;
  R0880: $URIxt + Hxt -> URI; v_777();
    v_777 = 1;
  TRANS_URI: $URIxt + Hxt => URI; v_778();
    v_778 = 1;
  TRANS_ALAABC: $ALAxt + ATP => ALA + ADP + PI; v_779();
    v_779 = 1;
  TRANS_ARGABC: $ARGxt + ATP => ARG + ADP + PI; v_780();
    v_780 = 1;
  TRANS_ASNABC: $ASNxt + ATP => ASN + ADP + PI; v_781();
    v_781 = 1;
  TRANS_ASPABC: $ASPxt + ATP => ASP + ADP + PI; v_782();
    v_782 = 1;
  TRANS_CYSABC: $CYSxt + ATP => CYS + ADP + PI; v_783();
    v_783 = 1;
  TRANS_DALAABC: $DALAxt + ATP => DALA + ADP + PI; v_784();
    v_784 = 1;
  TRANS_DGLUABC: $DGLUxt + ATP => DGLU + ADP + PI; v_785();
    v_785 = 1;
  TRANS_GLUABC: $GLUxt + ATP => GLU + ADP + PI; v_786();
    v_786 = 1;
  TRANS_GLYABC: $GLYxt + ATP => GLY + ADP + PI; v_787();
    v_787 = 1;
  TRANS_HISABC: $HISxt + ATP => HIS + ADP + PI; v_788();
    v_788 = 1;
  TRANS_ILEABC: $ILExt + ATP => ILE + ADP + PI; v_789();
    v_789 = 1;
  TRANS_LEUABC: $LEUxt + ATP => LEU + ADP + PI; v_790();
    v_790 = 1;
  TRANS_LYSABC: $LYSxt + ATP => LYS + ADP + PI; v_791();
    v_791 = 1;
  TRANS_SERABC: $SERxt + ATP => SER + ADP + PI; v_792();
    v_792 = 1;
  TRANS_THRABC: $THRxt + ATP => THR + ADP + PI; v_793();
    v_793 = 1;
  TRANS_TRPABC: $TRPxt + ATP => TRP + ADP + PI; v_794();
    v_794 = 1;
  TRANS_TYRABC: $TYRxt + ATP => TYR + ADP + PI; v_795();
    v_795 = 1;
  TRANS_VALABC: $VALxt + ATP => VAL + ADP + PI; v_796();
    v_796 = 1;
  TRANS_PHEABC: $PHExt + ATP => PHE + ADP + PI; v_797();
    v_797 = 1;
  TRANS_PROABC: $PROxt + ATP => PRO + ADP + PI; v_798();
    v_798 = 1;
  TRANS_ALA: $ALAxt + Hxt => ALA; v_799();
    v_799 = 1;
  TRANS_ASP: $ASPxt + Hxt => ASP; v_800();
    v_800 = 1;
  TRANS_GLU: $GLUxt + Hxt => GLU; v_801();
    v_801 = 1;
  TRANS_ILE: $ILExt + Hxt => ILE; v_802();
    v_802 = 1;
  TRANS_LEU: $LEUxt + Hxt => LEU; v_803();
    v_803 = 1;
  TRANS_LYS: $LYSxt + Hxt => LYS; v_804();
    v_804 = 1;
  TRANS_THR: $THRxt + Hxt => THR; v_805();
    v_805 = 1;
  TRANS_VAL: $VALxt + Hxt => VAL; v_806();
    v_806 = 1;
  TRANS_PRO: $PROxt + Hxt => PRO; v_807();
    v_807 = 1;
  TRANS_ALANa: $ALAxt + $Naxt -> ALA + Na; v_808();
    v_808 = 1;
  TRANS_GLYNa: $GLYxt + $Naxt -> GLY + Na; v_809();
    v_809 = 1;
  TRANS_LYSe: LYS + Hxt => $LYSxt; v_810();
    v_810 = 1;
  TRANS_DALA: $DALAxt + Hxt => DALA; v_811();
    v_811 = 1;
  TRANS_DLYS: $DLYSxt => DLYS; v_812();
    v_812 = 1;
  TRANS_ADN: $ADNxt + Hxt => ADN; v_813();
    v_813 = 1;
  TRANS_CYTD: $CYTDxt + Hxt -> CYTD; v_814();
    v_814 = 1;
  TRANS_DA: $DAxt + Hxt => DA; v_815();
    v_815 = 1;
  TRANS_AKG1: $AKGxt + Hxt => AKG; v_816();
    v_816 = 1;
  TRANS_AKG2: $AKGxt + $MALxt => AKG + MAL; v_817();
    v_817 = 1;
  TRANS_DHBZ: $DHBZxt => DHBZ; v_818();
    v_818 = 1;
  TRANS_PHEd: $PHExt => PHE; v_819();
    v_819 = 1;
  TRANS_TRPd: $TRPxt => TRP; v_820();
    v_820 = 1;
  TRANS_TYRd: $TYRxt => TYR; v_821();
    v_821 = 1;
  EXT_gcd: $GLCxt => $GLUCxt; v_822();
    v_822 = 1;
  EXT_gad: $GLUCxt => $KDGxt; v_823();
    v_823 = 1;
  TRANS_kguT: $KDGxt => KDG; v_824();
    v_824 = 1;
  TRANS_K1: Kxt + ATP => K + ADP + Pi; v_825();
    v_825 = 1;
  TRANS_K2: Kxt => K; v_826();
    v_826 = 1;
  TRANS_K3: K + Hxt => Kxt; v_827();
    v_827 = 1;
  TRANS_PHEACT: $PHEACTxt => PHEACT; v_828();
    v_828 = 1;
  TRANS_NTBZ: $NTBZxt => NTBZ; v_829();
    v_829 = 1;
  TRANS_FER: $FERxt => FER; v_830();
    v_830 = 1;
  TRANS_QTD: $QTxt => QT; v_831();
    v_831 = 1;
  TRANS_VN: $VNxt => VN; v_832();
    v_832 = 1;
  TRANS_VNL: $VNLxt => VNL; v_833();
    v_833 = 1;
  TRANS_PI: $PIxt + Hxt -> PI; v_834();
    v_834 = 1;
  TRANS_PIABC: $PIxt + ATP => ADP + 2 PI; v_835();
    v_835 = 1;
  TRANS_PIPC: $PIPCxt => PIPC; v_836();
    v_836 = 1;
  TRANS_NH3: $NH3xt -> NH3; v_837();
    v_837 = 1;
  TRANS_NO2: $NO2xt -> NO2; v_838();
    v_838 = 1;
  TRANS_O2: $O2xt -> O2; v_839();
    v_839 = 1;
  TRANS_Na1: Na + 2 Hxt => $Naxt; v_840();
    v_840 = 1;
  TRANS_Na2: 2 Na + 3 Hxt => 2 $Naxt; v_841();
    v_841 = 1;
  TRANS_Na3: $Naxt -> Na; v_842();
    v_842 = 1;
  TRANS_CATOL: $CATOLxt => CATOL; v_843();
    v_843 = 1;
  TRANS_Mg: Mgxt + ATP => Mg + ADP + PI; v_844();
    v_844 = 1;
  TRANS_Cd1: Cdxt + ATP => Cd + ADP + PI; v_845();
    v_845 = 1;
  TRANS_Cd2: Cd + ATP => Cdxt + ADP + PI; v_846();
    v_846 = 1;
  TRANS_Cu: Cu + ATP => Cuxt + ADP + PI; v_847();
    v_847 = 1;
  TRANS_TAU: TAUxt + ATP => TAU + ADP + PI; v_848();
    v_848 = 1;
  R0935: HOPT => ACAL + PYR; v_849();
    v_849 = 1;
  R0936: OCRO => HOPT + CO2; v_850();
    v_850 = 1;
  R0937: PPYR => PPAC + CO2; v_851();
    v_851 = 1;
  R0938: HXSP => SALC + CO2; v_852();
    v_852 = 1;
  R0939: DTC => DST + CO2; v_853();
    v_853 = 1;
  R0940: CMAR => HST + CO2; v_854();
    v_854 = 1;
  R0941: PHPYR => a_4HAC + CO2; v_855();
    v_855 = 1;
  R0942: THFG + ATP + GLU -> ADP + PI + THFPG; v_856();
    v_856 = 1;
  R0943: AMBL + NAD => GABA + NADH; v_857();
    v_857 = 1;
  R0944: N4ACAMBL + NAD => a_4ACAMBA + NADH; v_858();
    v_858 = 1;
  R0945: SMTDR1P -> SMTDRB1P; v_859();
    v_859 = 1;
  R0946: a_5MTA => AD + a_5MDR; v_860();
    v_860 = 1;
  R0947: GL3PETHAM => ETHAM + GL3P; v_861();
    v_861 = 1;
  R0948: GL3PCHOL => CHOL + GL3P; v_862();
    v_862 = 1;
  R0949: ETHAM -> ACAL + NH3; v_863();
    v_863 = 1;
  R0951: BUTANAL + NADPH -> BUTANOL + NADP; v_864();
    v_864 = 1;
  R0952: IMZACAL + NAD => IMZAC + NADH; v_865();
    v_865 = 1;
  R0953: MALEM => MALE + NH3; v_866();
    v_866 = 1;
  R0954: 2 COB2ACDM + FMN => 2 COB1ACDM + FMNH2; v_867();
    v_867 = 1;
  R0955: GA6P -> GA1P; v_868();
    v_868 = 1;
  R0959: ATP + CYS + DX5P + TYR => a_4HBA + THZP + ALA + AMP + CO2 + PPI; v_869();
    v_869 = 1;
  R0961: CHFAM => CHAM + FORM; v_870();
    v_870 = 1;
  R0962: HH + NADP => OHO + NADPH; v_871();
    v_871 = 1;
  R0963: ADIP + COA + ATP => ADIPCOA + AMP + PPI; v_872();
    v_872 = 1;
  R0964: a_5C2PCOA => a_3HADIPCOA; v_873();
    v_873 = 1;
  R0965: a_3HADIPCOA + NAD => a_3OADIPCOA + NADH; v_874();
    v_874 = 1;
  R0966: GGPP + 7 IPP => UDCPP + 7 PPI; v_875();
    v_875 = 1;
  R0967: a_3IP6OH + COA + ATP => a_3IP6OHCOA + ADP + PI; v_876();
    v_876 = 1;
  R0968: a_3IP6OH + COA + ATP => a_3IP6OHCOA + AMP + PPI; v_877();
    v_877 = 1;
  R0969: PRLC + COA + ATP => PRLCOA + ADP + PI; v_878();
    v_878 = 1;
  R0970: PRLC + COA + ATP => PRLCOA + AMP + PPI; v_879();
    v_879 = 1;
  R0971: a_3IP6OHS => a_3IP6OHCOAS; v_880();
    v_880 = 1;
  R0972: a_2M5IPH25Cc + ATP + COA => a_2M5IPH25COAc + AMP + PI; v_881();
    v_881 = 1;
  R0973: a_2M5IPH25Ct + ATP + COA => a_2M5IPH25COAt + AMP + PI; v_882();
    v_882 = 1;
  R0974: LMDOL => H2OLM; v_883();
    v_883 = 1;
  R0975: PIN => PICVOL; v_884();
    v_884 = 1;
  R0976: PRLAH + NAD => PRLC + NADH; v_885();
    v_885 = 1;
  R0977: PRLCOA => a_2H4IPCHCCOA; v_886();
    v_886 = 1;
  R0978: PICVOL => PICVN; v_887();
    v_887 = 1;
  R0979: a_3H26DM5MHCOA + NAD => a_26DM5M3OHCOA + NADH; v_888();
    v_888 = 1;
  R0980: a_2M5IPH25COAc => a_3H26DM5MHCOA; v_889();
    v_889 = 1;
  R0981: a_2M5IPH25COAt => a_3H26DM5MHCOA; v_890();
    v_890 = 1;
  R0982: a_26DM5M3OHCOA + COA => a_3IPB3ECOA + PPCOA; v_891();
    v_891 = 1;
  R0983: a_3IPB3ECOA => a_3IPB3EC + COA; v_892();
    v_892 = 1;
  R0984: bG2HCOUM => COUMT + GLC; v_893();
    v_893 = 1;
  R0985: COUMT => COUM; v_894();
    v_894 = 1;
  R0986: THSTB => TTHSTB; v_895();
    v_895 = 1;
  R0993: HH + NADP => OHO + NADPH; v_896();
    v_896 = 1;
  R0994: ADIP + COA + ATP => ADIPCOA + AMP + PPI; v_897();
    v_897 = 1;
  R0995: a_5C2PCOA => a_3HADIPCOA; v_898();
    v_898 = 1;
  R0996: a_3HADIPCOA + NAD => a_3OADIPCOA + NADH; v_899();
    v_899 = 1;
  R0997: TCHCATOL + O2 => TCHMUC; v_900();
    v_900 = 1;
  R0998: CHCATOL + O2 => CHMUC; v_901();
    v_901 = 1;
  R0999: HBNQ => BZQ; v_902();
    v_902 = 1;
  R1000: THBN -> HBNQ; v_903();
    v_903 = 1;
  R1001: NICATOL + O2 => THBN + NO2; v_904();
    v_904 = 1;
  R1002: a_4HBZ + O2 + NADPH => DHBZ + NADP; v_905();
    v_905 = 1;
  R1003: VNL + O2 + NADH => DHBZ + NAD + FALD; v_906();
    v_906 = 1;
  R1004: DHBZ + O2 => a_3CMUC; v_907();
    v_907 = 1;
  R1006: SFLN + OH => SO3 + MLAC; v_908();
    v_908 = 1;
  R1007: CHETOH + PQQ => CHETAL + PQQH2; v_909();
    v_909 = 1;
  R1008: CHETAL + NAD => CHAC + NADH; v_910();
    v_910 = 1;
  R1009: ACLE => ACAL; v_911();
    v_911 = 1;
  R1010: ETYO + COA + NAD => ACCOA + NADH; v_912();
    v_912 = 1;
  R1011: HNAPTHO + NADH + O2 => NAPTHDOL + CO2 + NAD; v_913();
    v_913 = 1;
  R1012: SALC + O2 + NADH => CATOL + CO2 + NAD; v_914();
    v_914 = 1;
  R1013: MACO -> MICIT; v_915();
    v_915 = 1;
  R1015: BZ + NADH + O2 => BZ12DOL + NAD; v_916();
    v_916 = 1;
  R1016: BZ + NADPH + O2 => BZ12DOL + NADP; v_917();
    v_917 = 1;
  R1017: BZ12DOL + NAD => CATOL + NADH + CO2; v_918();
    v_918 = 1;
  R1018: a_6HCHECBCOA => a_26DHCHCBCOA; v_919();
    v_919 = 1;
  R1019: a_6O2HCHCBCOA => HPIMCOA; v_920();
    v_920 = 1;
  R1020: a_23DHPIMCOA => HPIMCOA; v_921();
    v_921 = 1;
  R1021: HPIMCOA + NAD => OPIMCOA + NADH; v_922();
    v_922 = 1;
  R1022: OPIMCOA + COA => GCOA + ACCOA; v_923();
    v_923 = 1;
  R1023: GCOA + FAD => G1COA + CO2 + FADH2; v_924();
    v_924 = 1;
  R1024: G1COA => CTCOA + CO2; v_925();
    v_925 = 1;
  R1025: CTCOA => RHBCOA; v_926();
    v_926 = 1;
  R1026: RHBCOA + NADP => AACCOA + NADPH; v_927();
    v_927 = 1;
  R1027: CATOL + O2 => MUCA; v_928();
    v_928 = 1;
  R1028: MUCA -> MULAC; v_929();
    v_929 = 1;
  R1029: MULAC -> a_2O23DHFAC; v_930();
    v_930 = 1;
  R1030: a_2O23DHFAC => OADIP; v_931();
    v_931 = 1;
  R1031: SUCCOA + OADIP => SUCC + OADIPCOA; v_932();
    v_932 = 1;
  R1032: COA + OADIPCOA => SUCCOA + ACCOA; v_933();
    v_933 = 1;
  R1033: GALL + O2 => a_2PY46DC; v_934();
    v_934 = 1;
  R1034: a_3CMUC => a_4CMUCNLAC; v_935();
    v_935 = 1;
  R1035: a_4CMUCNLAC -> a_2O23DHFAC + CO2; v_936();
    v_936 = 1;
  R1038: a_2H3MBNPYR => MSLACAH + PYR; v_937();
    v_937 = 1;
  R1039: MSALC + O2 + NADH => MCATOL + NAD + CO2; v_938();
    v_938 = 1;
  R1040: HMNAPTH + NAD => NAPTHAH + NADH; v_939();
    v_939 = 1;
  R1041: a_12DH12DH8CNAPTH => a_12DH8CNAPTH; v_940();
    v_940 = 1;
  R1042: a_2H3CBNPYR => FSALAC + PYR; v_941();
    v_941 = 1;
  R1043: NAPTHMSUCCOA => NAPTHMESUCCOA; v_942();
    v_942 = 1;
  R1044: NAPTHMESUCCOA => NAPTHHMSUCCOA; v_943();
    v_943 = 1;
  R1045: NAPTHHMSUCCOA => NAPTHOMSUCCOA; v_944();
    v_944 = 1;
  R1046: NAPTHOMSUCCOA + COA => NAPTHOCOA + SUCCOA; v_945();
    v_945 = 1;
  R1047: MSALC4 + O2 + NADH => MCATOL4 + NAD + CO2; v_946();
    v_946 = 1;
  R1048: a_2H4HMBNPYR => HMSALCAH + PYR; v_947();
    v_947 = 1;
  R1049: HMSALC + O2 + NADH => HMCATOL + NAD + CO2; v_948();
    v_948 = 1;
  R1050: HMNAPTH2 + NAD => NAPTHAH2 + NADH; v_949();
    v_949 = 1;
  R1055: VN + NAD => VNL + NADH; v_950();
    v_950 = 1;
  TRANS_SUCCOA: $SUCCOAxt => SUCCOA; v_951();
    v_951 = 1;
  R1057: NTBZ => CATOL; v_952();
    v_952 = 1;
  R1058: SLIM + O2 + NADPH => PRLOH + NADP; v_953();
    v_953 = 1;
  R1059: PRLOH + NAD => PRLAH + NADH; v_954();
    v_954 = 1;
  R1062: H2O + a_4OMC => a_4C4H2OADIP; v_955();
    v_955 = 1;
  R1063: a_4C4H2OADIP => PYR + OA; v_956();
    v_956 = 1;
  R1065: CMAR => a_4HBZ; v_957();
    v_957 = 1;
  TRANS_CMAR: $CMARxt => CMAR; v_958();
    v_958 = 1;
  R1067: CONOL + NADP => CONAL + NADPH; v_959();
    v_959 = 1;
  R1068: CONAL + NAD => FER + NADH; v_960();
    v_960 = 1;
  R1069: ATP + FER + COA => AMP + PPI + FERCOA; v_961();
    v_961 = 1;
  R1070: FERCOA => VN + ACCOA; v_962();
    v_962 = 1;
  R1071: CAFF => DHBZ; v_963();
    v_963 = 1;
  TRANS_CAFF: $CAFFxt => CAFF; v_964();
    v_964 = 1;
  TRANS_CONOL: $CONOLxt => CONOL; v_965();
    v_965 = 1;
  R1074: PHEACAL + NAD => PHEACT + NADH; v_966();
    v_966 = 1;
  R1075: PHEAM + O2 => PHEACAL + NH3 + H2O2; v_967();
    v_967 = 1;
  R1077: AGL3P + ACOA => PA + COA; v_968();
    v_968 = 1;
  R1078: AKG + ALA -> GLU + PYR; v_969();
    v_969 = 1;
  R1079: HSER + SUCCOA => COA + OSLHSER; v_970();
    v_970 = 1;
  R1080: PAP => AMP + PI; v_971();
    v_971 = 1;
  TRANS_4HBZ: $a_4HBZxt => a_4HBZ; v_972();
    v_972 = 1;
  R1085: QT + NAD => DQT + NADH; v_973();
    v_973 = 1;
  DEG_QuiA: DQT => DHBZ; v_974();
    v_974 = 1;
  R1086: a_4PHEACT => a_4HPHEAC; v_975();
    v_975 = 1;
  R1087: a_4HPHEAC + O2 + NADH => HOMOGEN + NAD; v_976();
    v_976 = 1;
  TRANS_HOMOGEN: HOMOGENxt => HOMOGEN; v_977();
    v_977 = 1;
  R1089: NAC + NADP => HNAC + NADPH; v_978();
    v_978 = 1;
  R1090: O2 + 2 HNAC => 2 DHPY + 2 CO2; v_979();
    v_979 = 1;
  R1091: DHPY + O2 => NFM; v_980();
    v_980 = 1;
  NNnicD: NFM => MALEM + FORM; v_981();
    v_981 = 1;
  R1092: MALE => FUM; v_982();
    v_982 = 1;
  R1093: LYS + O2 => AVALAM + CO2; v_983();
    v_983 = 1;
  R1094: AVALAM => AVAL + NH3; v_984();
    v_984 = 1;
  R1095: AVAL + AKG -> GLRSAH + GLU; v_985();
    v_985 = 1;
  R1096: GLRSAH + NAD => GLR + NADH; v_986();
    v_986 = 1;
  R1097: GLR + ATP + COA => GCOA + ADP + PI; v_987();
    v_987 = 1;
  R1098: DLYS + AKG => AMOHEX + DALA; v_988();
    v_988 = 1;
  R1099: AMOHEX -> PIPD2CAR; v_989();
    v_989 = 1;
  R1100: PIPD2CAR + NADPH -> PIPC + NADP; v_990();
    v_990 = 1;
  R1101: PIPC + O2 => PIPD6CAR + H2O2; v_991();
    v_991 = 1;
  R1102: PIPD6CAR -> AMADIPSAH; v_992();
    v_992 = 1;
  R1103: AMADIPSAH + NAD => AMADIP + NADH; v_993();
    v_993 = 1;
  R1104: AMADIP + AKG -> OAP + GLU; v_994();
    v_994 = 1;
  R1105: AA -> DAA; v_995();
    v_995 = 1;
  R1106: DLYS -> LYS; v_996();
    v_996 = 1;
  BOX_14fadE: HTDACOA + FAD => HTDECOA + FADH2; v_997();
    v_997 = 1;
  BOX_14fadBX1: HTDECOA => SHTDHACOA; v_998();
    v_998 = 1;
  BOX_14phaJ: HTDECOA => RHTDHACOA; v_999();
    v_999 = 1;
  BOX_14epi: SHTDHACOA => RHTDHACOA; v_1000();
    v_1000 = 1;
  BOX_14fadBX2: SHTDHACOA + NAD => HTDOCOA + NADH; v_1001();
    v_1001 = 1;
  BOX_14fabG: HTDOCOA => RHTDHACOA; v_1002();
    v_1002 = 1;
  BOX_14fadA: COA + HTDOCOA => HDDACOA + ACCOA; v_1003();
    v_1003 = 1;
  BOX_12fadE: HDDACOA + FAD => HDDECOA + FADH2; v_1004();
    v_1004 = 1;
  BOX_12fadBX1: HDDECOA => SHDDHACOA; v_1005();
    v_1005 = 1;
  BOX_12phaJ: HDDECOA => RHDDHACOA; v_1006();
    v_1006 = 1;
  BOX_12epi: SHDDHACOA => RHDDHACOA; v_1007();
    v_1007 = 1;
  BOX_12fadBX2: SHDDHACOA + NAD => HDDOCOA + NADH; v_1008();
    v_1008 = 1;
  BOX_12fabG: HDDOCOA => RHDDHACOA; v_1009();
    v_1009 = 1;
  BOX_12fadA: COA + HDDOCOA => HDACOA + ACCOA; v_1010();
    v_1010 = 1;
  BOX_10fadE: HDACOA + FAD => HDECOA + FADH2; v_1011();
    v_1011 = 1;
  BOX_10fadBX1: HDECOA => SHDHACOA; v_1012();
    v_1012 = 1;
  BOX_10phaJ: HDECOA => RHDHACOA; v_1013();
    v_1013 = 1;
  BOX_10epi: SHDHACOA => RHDHACOA; v_1014();
    v_1014 = 1;
  BOX_10fadBX2: SHDHACOA + NAD => HDOCOA + NADH; v_1015();
    v_1015 = 1;
  BOX_10fabG: HDOCOA => RHDHACOA; v_1016();
    v_1016 = 1;
  BOX_10fadA: COA + HDOCOA => HOACOA + ACCOA; v_1017();
    v_1017 = 1;
  BOX_08fadE: HOACOA + FAD => HOECOA + FADH2; v_1018();
    v_1018 = 1;
  BOX_08fadBX1: HOECOA => SHOHACOA; v_1019();
    v_1019 = 1;
  BOX_08phaJ: HOECOA => RHOHACOA; v_1020();
    v_1020 = 1;
  BOX_08epi: SHOHACOA => RHOHACOA; v_1021();
    v_1021 = 1;
  BOX_08fadBX2: SHOHACOA + NAD => HOOCOA + NADH; v_1022();
    v_1022 = 1;
  BOX_08fabG: HOOCOA => RHOHACOA; v_1023();
    v_1023 = 1;
  BOX_08fadA: COA + HOOCOA => HHXACOA + ACCOA; v_1024();
    v_1024 = 1;
  BOX_06fadE: HHXACOA + FAD => HHXECOA + FADH2; v_1025();
    v_1025 = 1;
  BOX_06fadBX1: HHXECOA + H2O => SHHXHACOA; v_1026();
    v_1026 = 1;
  BOX_06phaJ: HHXECOA => RHHXHACOA; v_1027();
    v_1027 = 1;
  BOX_06epi: SHHXHACOA => RHHXHACOA; v_1028();
    v_1028 = 1;
  BOX_06fadBX2: SHHXHACOA + NAD => HHXOCOA + NADH; v_1029();
    v_1029 = 1;
  BOX_06fabG: HHXOCOA => RHHXHACOA; v_1030();
    v_1030 = 1;
  BOX_06fadA: COA + HHXOCOA => HBACOA + ACCOA; v_1031();
    v_1031 = 1;
  BOX_04fadE: HBACOA + FAD => HBECOA + FADH2; v_1032();
    v_1032 = 1;
  BOX_04fadBX1: HBECOA => SHBHACOA; v_1033();
    v_1033 = 1;
  BOX_04phaJ: HBECOA => RHBHACOA; v_1034();
    v_1034 = 1;
  BOX_04epi: SHBHACOA => RHBHACOA; v_1035();
    v_1035 = 1;
  BOX_04fadBX2: SHBHACOA + NAD => HBOCOA + NADH; v_1036();
    v_1036 = 1;
  BOX_04fabG: HBOCOA => RHBHACOA; v_1037();
    v_1037 = 1;
  BOX_04fadA: COA + HBOCOA => 2 ACCOA; v_1038();
    v_1038 = 1;
  PHTD_BSynth: RHTDHACOA -> PHTD + COA; v_1039();
    v_1039 = 1;
  PHDD_BSynth: RHDDHACOA -> PHDD + COA; v_1040();
    v_1040 = 1;
  PHD_BSynth: RHDHACOA -> PHD + COA; v_1041();
    v_1041 = 1;
  PHO_BSynth: RHOHACOA -> PHO + COA; v_1042();
    v_1042 = 1;
  PHHX_BSynth: RHHXHACOA -> PHHX + COA; v_1043();
    v_1043 = 1;
  PHB_BSynth: RHBHACOA -> PHB + COA; v_1044();
    v_1044 = 1;
  PHB_Synth: C040ACP => PHB + ACP; v_1045();
    v_1045 = 1;
  PHHX_Synth: C060ACP => PHHX + ACP; v_1046();
    v_1046 = 1;
  PHO_Synth: C080ACP => PHO + ACP; v_1047();
    v_1047 = 1;
  PHD_Synth: C100ACP => PHD + ACP; v_1048();
    v_1048 = 1;
  PHDD_Synth: C120ACP => PHDD + ACP; v_1049();
    v_1049 = 1;
  PHTD_Synth: C140ACP => PHTD + ACP; v_1050();
    v_1050 = 1;
  R2001: ATP + C140 + COA => AMP + PPI + HTDACOA; v_1051();
    v_1051 = 1;
  R2002: ATP + C120 + COA => AMP + PPI + HDDACOA; v_1052();
    v_1052 = 1;
  R2003: ATP + C100 + COA => AMP + PPI + HDACOA; v_1053();
    v_1053 = 1;
  R2004: ATP + C080 + COA => AMP + PPI + HOACOA; v_1054();
    v_1054 = 1;
  R2005: ATP + C060 + COA => AMP + PPI + HHXACOA; v_1055();
    v_1055 = 1;
  R2006: ATP + C040 + COA => AMP + PPI + HBACOA; v_1056();
    v_1056 = 1;
  R2007: C140ACP => C140 + ACP; v_1057();
    v_1057 = 1;
  R2008: C120ACP => C120 + ACP; v_1058();
    v_1058 = 1;
  R2009: C100ACP => C100 + ACP; v_1059();
    v_1059 = 1;
  R2010: C080ACP => C080 + ACP; v_1060();
    v_1060 = 1;
  R2011: C060ACP => C060 + ACP; v_1061();
    v_1061 = 1;
  R2012: C040ACP => C040 + ACP; v_1062();
    v_1062 = 1;
  TRANS_C060: C060xt => C060; v_1063();
    v_1063 = 1;
  TRANS_C080: $C080xt => C080; v_1064();
    v_1064 = 1;
  TRANS_C100: $C100xt => C100; v_1065();
    v_1065 = 1;
  TRANS_C120: $C120xt => C120; v_1066();
    v_1066 = 1;
  TRANS_C140: C140xt => C140; v_1067();
    v_1067 = 1;
  TRANS_PHA: PHA -> $PHAxt; v_1068();
    v_1068 = 1;
  PHA_Synth: 0.016 PHTD + 0.165 PHDD + 0.743 PHD + 0.069 PHO -> 0.169 PHA; v_1069();
    v_1069 = 1;
  Y1: GL3P + 0.067 C100ACP + 0.182 C120ACP + 0.018 C140ACP + 0.587 C160ACP + 0.046 C180ACP + 0.1 C181ACP => AGL3P + ACP; v_1070();
    v_1070 = 1;
  Y2: AGL3P + 0.067 C100ACP + 0.182 C120ACP + 0.018 C140ACP + 0.587 C160ACP + 0.046 C180ACP + 0.1 C181ACP => PA + ACP; v_1071();
    v_1071 = 1;
end
